** © Ihor Mirzov, August 2019
** Distributed under GNU General Public License v3.0
**
** Empty lines and comments are ignored. No spaces after punctuation symbols!
** Padding with tabs is mandatory - it defines nesting!
**
** CalculiX keywords start with '*'. If keyword ends with '__newline'
** it means that all arguments should and will be written from a new line.
** '__' in the line's end is needed just for correct highlighting in vscode -
** parser removes it
**
** Parameters start with ','. Parameter values go after '=' and are separated by '|'.
** Usually parameter ends with '='. Parameters without '=' are just keys.
** Mutually exclusive parameters are separated with '|'. No '__required' flag means
** that parameter is optional. Argument's default value should come first.


Model__group

	Parameters__group
		*HEADING
		*DESIGN VARIABLES,TYPE__required=COORDINATE|ORIENTATION
		*PHYSICAL CONSTANTS,ABSOLUTE ZERO=,STEFAN BOLTZMANN=,NEWTON GRAVITY=__
		*VALUES AT INFINITY
		*SUBMODEL,TYPE__required=SURFACE|NODE,INPUT__required=,GLOBAL ELSET=__
			*DSLOAD,SUBMODEL__required,STEP__required=__

	Mesh__group
		*NODE,NSET=__
		*NSET,NSET__required=,GENERATE
		*ELEMENT,TYPE=C3D8|F3D8|C3D8R|C3D8I|C3D6|F3D6|C3D4|F3D4|C3D20|C3D20R|C3D15|C3D10|C3D10T|S3|M3D3|CPS3|CPE3|CAX3|S6|M3D6|CPS6|CPE6|CAX6|S4|S4R|M3D4|M3D4R|CPS4|CPS4R|CPE4|CPE4R|CAX4|CAX4R|S8|S8R|M3D8|M3D8R|CPS8|CPS8R|CPE8|CPE8R|CAX8|CAX8R|B21|B31|B31R|T2D2|T3D2|GAPUNI|DASHPOTA|SPRING2|SPRINGA|B32|B32R|T3D3|D|SPRING1|DCOUP3D|MASS
			*USER ELEMENT,TYPE__required=,INTEGRATION POINTS__required=,MAXDOF__required=,NODES__required=__
		*ELSET,ELSET__required=,GENERATE
		*SURFACE,NAME__required=,TYPE=ELEMENT|NODE
		*GAP,ELSET__required=__

	Properties__group
		*NODAL THICKNESS
		*NORMAL
		*MASS,ELSET__required=__
		*SPRING,ELSET__required=,NONLINEAR,ORIENTATION=__
		*DASHPOT,ELSET__required=__
		*MATERIAL,NAME__required=__
			*CONDUCTIVITY,TYPE=ISO|ORTHO|ANISO
			*CREEP,LAW=NORTON|USER
			*CYCLIC HARDENING
			*DAMPING,ALPHA=,BETA=,STRUCTURAL__required=__
			*DEFORMATION PLASTICITY
			*DENSITY
			*DEPVAR
			*ELASTIC,TYPE=ISO|ORTHO|ENGINEERING CONSTANTS|ANISO
			*ELECTRICAL CONDUCTIVITY
			*EXPANSION,TYPE=ISO|ORTHO|ANISO,ZERO=__
			*FLUID CONSTANTS
			*HYPERELASTIC,ARRUDA-BOYCE|MOONEY-RIVLIN|NEO HOOKE|OGDEN|POLYNOMIAL|REDUCED POLYNOMIAL|VANDERWAALS|YEOH,N=1|2|3
			*HYPERFOAM,N=__
			*MAGNETIC PERMEABILITY
			*PLASTIC,HARDENING=ISOTROPIC|KINEMATIC|COMBINED|USER
			*SPECIFIC GAS CONSTANT
			*SPECIFIC HEAT
			*USER MATERIAL,CONSTANTS__required=,TYPE=MECHANICAL|THERMAL

		Section__group
			*BEAM SECTION,ELSET__required=,MATERIAL__required=,SECTION__required=RECT|CIRC|PIPE|BOX,ORIENTATION=,OFFSET1,OFFSET2,NODAL THICKNESS
			*FLUID SECTION,ELSET__required=,MATERIAL__required=,TYPE=,OIL,CONSTANTS=__
			*MEMBRANE SECTION
			*SHELL SECTION,ELSET__required=,(MATERIAL=|COMPOSITE=)__required,ORIENTATION=,NODAL THICKNESS=,OFFSET=__
			*SOLID SECTION,ELSET__required=,MATERIAL__required=,ORIENTATION=__
			*PRE-TENSION SECTION,SURFACE__required=,ELEMENT__required=,NODE__required=__

	*ORIENTATION,NAME__required=,SYSTEM=RECTANGULAR|CYLINDRICAL
	*TRANSFORM,NSET__required=,TYPE=R|C
	*TRANSFORMF,SURFACE__required=,TYPE=R|C
	*AMPLITUDE,NAME__required=,TIME= |TOTAL TIME,USER,SHIFTX=,SHIFTY=__
	*BOUNDARY,OP=NEW|MOD,AMPLITUDE=,TIME DELAY=,LOAD CASE= |1|2,USER,MASS FLOW=,FIXED,SUBMODEL,STEP=,DATA SET=__
	*INCLUDE,INPUT__required=__
	*INITIAL CONDITIONS,TYPE__required=DISPLACEMENT|FLUID VELOCITY|MASS FLOW|PLASTIC STRAIN|PRESSURE|SOLUTION|STRESS|TEMPERATURE|TOTAL PRESSURE|VELOCITY,USER
	*RESTART,READ__required,STEP=__
	*TIME POINTS,NAME__required=,TIME= |TOTAL TIME,GENERATE

	Interactions__group
		*CONTACT PAIR,INTERACTION__required=,TYPE__required=NODE TO SURFACE|SURFACE TO SURFACE,SMALL SLIDING,ADJUST
		*CLEARANCE,MASTER__required=,SLAVE__required=,VALUE__required=__
		*SURFACE INTERACTION,NAME__required=__
			*SURFACE BEHAVIOR,PRESSURE-OVERCLOSURE__required=EXPONENTIAL|LINEAR|TABULAR|TIED|HARD
				*FRICTION
				*GAP CONDUCTANCE,USER
				*CONTACT DAMPING,TANGENT FRACTION
				*GAP HEAT GENERATION,USER

	Constraints__group
		*EQUATION
		*MPC__newline,PLANE|STRAIGHT|BEAM
		*NETWORK MPC, TYPE= |QUADRATIC
		*RIGID BODY,(NSET=|ELSET=)__required,REF NODE=,ROT NODE=__
		*COUPLING,REF NODE__required=,SURFACE__required=,CONSTRAINT NAME__required=,ORIENTATION=__
		*DISTRIBUTING
		*DISTRIBUTING COUPLING,ELSET__required=__
		*KINEMATIC
		*TIE,NAME__required=,POSITION TOLERANCE=,ADJUST,CYCLIC SYMMETRY|MULTISTAGE|FLUID PERIODIC|FLUID CYCLIC
		*CYCLIC SYMMETRY MODEL,N__required=,NGRAPH=,TIE__required=,ELSET=,CHECK=YES|NO

	*STEP,PERTURBATION,NLGEOM,INC=,INCF=,THERMAL NETWORK,AMPLITUDE=RAMP|STEP

		Analysis type__group
			*NO ANALYSIS
			*BUCKLE,SOLVER__required=SPOOLES|PARDISO|SGI|TAUCS
			*CFD,STEADY STATE,TIME RESET,TOTAL TIME AT START==,COMPRESSIBLE,TURBULENCE MODEL=NONE|K-EPSILON|K-OMEGA|SST,SCHEME=UD|MODSMART,SIMPLEC
			*COUPLED TEMPERATURE-DISPLACEMENT,SOLVER=SPOOLES|PARDISO|SGI|TAUCS|ITERATIVE CHOLESKY|ITERATIVE SCALING,DIRECT,ALPHA=,STEADY STATE,DELTMX=,TIME RESET,TOTAL TIME AT START=,COMPRESSIBLE
			*DYNAMIC,DIRECT,ALPHA=,EXPLICIT,SOLVER=SPOOLES|PARDISO|SGI|TAUCS|ITERATIVE CHOLESKY|ITERATIVE SCALING
			*ELECTROMAGNETICS,SOLVER=SPOOLES|PARDISO|SGI|TAUCS|ITERATIVE CHOLESKY|ITERATIVE SCALING,DIRECT,MAGNETOSTATICS,DELTMX=,TIME RESET,TOTAL TIME AT START=,NO HEAT TRANSFER
			*FREQUENCY,SOLVER=SPOOLES|PARDISO|SGI|TAUCS,MATRIXSTORAGE,STORAGE=YES|NO,GLOBAL=YES|NO,CYCMPC=ACTIVE|INACTIVE
				*SELECT CYCLIC SYMMETRY MODES,NMIN=,NMAX=__
			*COMPLEX FREQUENCY,CORIOLIS__required
			*GREEN,SOLVER=PARDISO|SPOOLES
			*HEAT TRANSFER,SOLVER=SPOOLES|PARDISO|SGI|TAUCS|ITERATIVE CHOLESKY|ITERATIVE SCALING,MATRIXSTORAGE,DIRECT,STEADY STATE,FREQUENCY,MODAL DYNAMIC,STORAGE=YES|NO,DELTMX=,TIME RESET,TOTAL TIME AT START=__
				*VIEWFACTOR,READ,INPUT,WRITE|WRITE ONLY,OUTPUT,NO CHANGE
			*MODAL DYNAMIC,SOLVER=SPOOLES|PARDISO|SGI|TAUCS,DIRECT=NO|YES,DELTMX=,STEADY STATE
				*BASE MOTION,DOF__required=,AMPLITUDE__required=,TYPE=ACCELERATION|DISPLACEMENT
			*SENSITIVITY,NLGEOM,READ,WRITE
				*CONSTRAINT,DISPLACEMENT,EIGENFREQUENCY,MASS,SHAPEENERGY,STRESS,THICKNESS,FIXGROWTH,FIXSHRINKAGE
				*OBJECTIVE__newline,DISPLACEMENT,EIGENFREQUENCY,GREEN,MASS,SHAPEENERGY,STRESS
					*FILTER,TYPE=LINEAR|QUADRATIC|CUBIC,BOUNDARY WEIGHTING=YES|NO,EDGE PRESERVATION=YES|NO,DIRECTION WEIGHTING=YES|NO
			*STATIC,SOLVER=SPOOLES|PARDISO|SGI|TAUCS|ITERATIVE CHOLESKY|ITERATIVE SCALING,DIRECT,EXPLICIT,TIME RESET,TOTAL TIME AT START=__
				*TEMPERATURE,OP=NEW|MOD,AMPLITUDE=,TIME DELAY=,USER,SUBMODEL,STEP=,DATA SET=__
			*STEADY STATE DYNAMICS,HARMONIC=YES|NO,SOLVER=SPOOLES|PARDISO|SGI|TAUCS
				*BASE MOTION,DOF__required,AMPLITUDE__required,TYPE=ACCELERATION|DISPLACEMENT
			*SUBSTRUCTURE GENERATE,SOLVER=SPOOLES|PARDISO
				*SUBSTRUCTURE MATRIX OUTPUT,FILE NAME__required=,STIFFNESS=YES,OUTPUT FILE=USER DEFINED
				*RETAINED NODAL DOFS,SORTED=NO
			*UNCOUPLED TEMPERATURE-DISPLACEMENT,SOLVER=SPOOLES|PARDISO|SGI|TAUCS|ITERATIVE CHOLESKY|ITERATIVE SCALING,DIRECT,ALPHA=,STEADY STATE,DELTMX=,EXPLICIT,TIME RESET,TOTAL TIME AT START=__
			*VISCO,SOLVER=SPOOLES|PARDISO|SGI|TAUCS|ITERATIVE CHOLESKY|ITERATIVE SCALING,DIRECT,EXPLICIT,TIME RESET,TOTAL TIME AT START=,CETOL=__

		Field Output__group
			*EL FILE,(FREQUENCY=|FREQUENCYF=|TIME POINTS=),GLOBAL=YES|NO,OUTPUT=2D|3D,SECTION FORCES,NSET=,LAST ITERATIONS,CONTACT ELEMENTS
			*ELEMENT OUTPUT
			*EL PRINT,ELSET__required=,(FREQUENCY=|FREQUENCYF=|TIME POINTS=),TOTALS=YES|ONLY|NO,GLOBAL=YES|NO
			*NODE FILE,NSET=,(FREQUENCY=|FREQUENCYF=|TIME POINTS=),GLOBAL=YES|NO,OUTPUT=2D|3D,LAST ITERATIONS,CONTACT ELEMENTS
			*NODE OUTPUT,(FREQUENCY=|TIME POINTS=)__
			*NODE PRINT,NSET=,(FREQUENCY=|FREQUENCYF=|TIME POINTS=),TOTALS=YES|ONLY|NO,GLOBAL=YES|NO
			*CONTACT FILE,(FREQUENCY=|TIME POINTS=),LAST ITERATIONS,CONTACT ELEMENTS
			*CONTACT OUTPUT,(FREQUENCY=|TIME POINTS=),LAST ITERATIONS,CONTACT ELEMENTS
			*CONTACT PRINT,(FREQUENCY=|TIME POINTS=),TOTALS=YES|ONLY|NO
			*SECTION PRINT,SURFACE__required=,NAME__required=,(FREQUENCYF=|TIME POINTS=),SOF,SOM,SOAREA

		Load & BC__group
			*BOUNDARY,OP=NEW|MOD,AMPLITUDE=,TIME DELAY=,LOAD CASE= |1|2,USER,MASS FLOW=,FIXED,SUBMODEL,STEP=,DATA SET=__
			*BOUNDARYF,AMPLITUDE=,TIME DELAY=,USER
			*MASS FLOW
			*CLOAD,OP=NEW|MOD,AMPLITUDE=,TIME DELAY=,USER,LOAD CASE=1|2,SECTOR=,SUBMODEL,STEP=,DATA SET=,OMEGA0=__
			*DLOAD,OP=NEW|MOD,AMPLITUDE=,TIME DELAY=,LOAD CASE=1|2,SECTOR=__
			*CFLUX,OP=NEW|MOD,AMPLITUDE=,TIME DELAY=,USER,ADD
			*DFLUX,OP=NEW|MOD,AMPLITUDE=,TIME DELAY=__
			*RADIATE,OP=NEW|MOD,AMPLITUDE=,TIME DELAY=,RADIATION AMPLITUDE=,RADIATION TIME DELAY=,ENVNODE=,CAVITY=__
			*FILM,OP=NEW|MOD,AMPLITUDE=,TIME DELAY=,FILM AMPLITUDE=,FILM TIME DELAY=__
			*MODAL DAMPING,(MODAL=DIRECT)|RAYLEIGH

		Change__group
			*INITIAL STRAIN INCREASE
			*CHANGE FRICTION,INTERACTION__required=__
				*FRICTION
			*CHANGE MATERIAL,NAME__required=__
			*CHANGE PLASTIC,HARDENING=ISOTROPIC|KINEMATIC
			*CHANGE SURFACE BEHAVIOR,INTERACTION__required=__
			*CHANGE SOLID SECTION,ELSET__required=,MATERIAL__required=,ORIENTATION=__
			*MODEL CHANGE,TYPE__required=ELEMENT|CONTACT PAIR,ADD=STRAIN FREE|WITH STRAIN,REMOVE

		*CONTROLS,PARAMETERS=TIME INCREMENTATION|FIELD|LINE SEARCH|NETWORK|CFD|CONTACT,RESET
		*EQUATION,REMOVE|REMOVE ALL
		*INCLUDE,INPUT__required
		*REFINE MESH,LIMIT=__
		*RESTART,WRITE__required,FREQUENCY=,OVERLAY
		*END STEP

	Job__group
