**
**   Structure: disk.
**   Test objective: heat transfer with CAX6 elements
**
*NODE, NSET=Nall
       1,  0.00000e+00   ,  1.00000e+00,0.00000e+00
       2,  0.00000e+00   ,  5.00000e-01,0.00000e+00
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*ELEMENT, TYPE=CAX6, ELSET=Eall
     1,      1,      2,      3,      4,      5,      6
     2,      3,      2,      7,      5,      8,      9
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*MATERIAL,NAME=EL
*DENSITY
7800.
*CONDUCTIVITY
50.
*SPECIFIC HEAT
446.
*SOLID SECTION,ELSET=Eall,MATERIAL=EL
0.01
*INITIAL CONDITIONS,TYPE=TEMPERATURE
Nall,20.
**
*STEP,NLGEOM
*HEAT TRANSFER,STEADY STATE
*BOUNDARY
1,11,11,0.
46,11,11,100.
*EL PRINT,ELSET=Eall
HFL
*END STEP
