**
**   Structure: beam between two plates.
**   Test objective: contact.
**
*NODE, NSET=Nall
      1,0.000000000000e+00,0.000000000000e+00,0.000000000000e+00
      2,1.000000000000e+00,0.000000000000e+00,0.000000000000e+00
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*ELEMENT, TYPE=C3D20R, ELSET=Eall
    1,    1,    10,    95,    19,    61,   105,   222,   192,    9,    93,
        94,    20,   104,   220,   221,   193,    62,   103,   219,   190
    2,    10,    2,    13,    95,   105,    34,   134,   222,    11,    12,
        96,    93,   106,   133,   223,   220,   103,    33,   132,   219
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*ELEMENT, TYPE=C3D8, ELSET=Eall
    33,   454,   455,   456,   457,   458,   459,   460,   461
    34,   462,   463,   464,   465,   466,   467,   468,   469
*NSET,NSET=Nfix
    1,
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*BOUNDARY
    Nfix,1,3
*MATERIAL,NAME=EL
*ELASTIC
    210000.,.3
*DENSITY
    7.8E-9
*SOLID SECTION,ELSET=Eall,MATERIAL=EL
*SURFACE, NAME=Smast1
    34, S2
*SURFACE, NAME=Smast2
    33, S1
*SURFACE, NAME=Sslav1
    29, S6
    31, S6
*SURFACE, NAME=Sslav2
    30, S4
    32, S4
*CONTACT PAIR,INTERACTION=SI1,TYPE=SURFACE TO SURFACE
    Sslav1,Smast1
*CONTACT PAIR,INTERACTION=SI1,TYPE=SURFACE TO SURFACE
    Sslav2,Smast2
*SURFACE INTERACTION,NAME=SI1
*SURFACE BEHAVIOR,PRESSURE-OVERCLOSURE=LINEAR
    1.e8,3.
*STEP,NLGEOM
*STATIC
    0.999,1.
*CLOAD
    204,1,1000.
*CONTACT FILE,FREQUENCY=10
    CDIS,CSTRE
*END STEP
