**
**   Structure: cantilever beam.
**   Test objective: heat transfer: body heating (BF)
**
*HEADING
Model: beam     Date: 10-Mar-1998
*NODE,NSET=Nall
     1,      0.000000,      0.000000,      0.000000
     2,      1.000000,      0.000000,      0.000000
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*ELEMENT, TYPE=C3D20R   , ELSET=Eall
     1,     1,    10,    95,    19,    61,   105,   222,   192,     9,    93,
           94,    20,   104,   220,   221,   193,    62,   103,   219,   190
     2,    10,     2,    13,    95,   105,    34,   134,   222,    11,    12,
           96,    93,   106,   133,   223,   220,   103,    33,   132,   219
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*NSET, NSET=CN7
    97,    96,    95,    94,    93,    20
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*MATERIAL,NAME=EL
*ELASTIC
210000.,.3
*DENSITY
7.8E-9
*EXPANSION
12.E-6
*CONDUCTIVITY
50.,0.
*SPECIFIC HEAT
1.
*PHYSICAL CONSTANTS,ABSOLUTE ZERO=-273.15,STEFAN BOLTZMANN=5.669E-8
*SOLID SECTION,ELSET=Eall,MATERIAL=EL
*INITIAL CONDITIONS,TYPE=TEMPERATURE
Nall,0.
**
*ELSET,ELSET=LAST
29,30,31,32
*STEP
*HEAT TRANSFER,STEADY STATE
*BOUNDARY
CN7, 0,0,100.
*DFLUX
LAST,BF,7.8E2
*NODE PRINT,NSET=Nall
NT,RFL
*EL PRINT,ELSET=Eall
HFL
*EL PRINT,ELSET=LAST,TOTALS=YES
EBHE
*END STEP
