**
**   Structure: cantilever beam under twist.
**   Test objective: mean rotation MPC; linearized version;
**
*HEADING
Model: beam     Date: 10-Mar-1998
*NODE
     1,      0.000000,      0.000000,      0.000000
     2,      1.000000,      0.000000,      0.000000
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*ELEMENT, TYPE=C3D20R   , ELSET=B1
     1,     1,    10,    95,    19,    61,   105,   222,   192,     9,    93,
           94,    20,   104,   220,   221,   193,    62,   103,   219,   190
     2,    10,     2,    13,    95,   105,    34,   134,   222,    11,    12,
           96,    93,   106,   133,   223,   220,   103,    33,   132,   219
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*NSET, NSET=CN7
    97,    96,    95,    94,    93,    20
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*BOUNDARY
CN7,1,3
*ELSET,ELSET=EALL,GENERATE
1,32
*NSET,NSET=NALL,GENERATE
1,261
*MATERIAL,NAME=LIN_ISO_EL
*ELASTIC
210000.,.3
*SOLID SECTION,ELSET=EALL,MATERIAL=LIN_ISO_EL
*MPC
MEANROT,5,5,5,6,6,6,7,7,7,8,8,8,262
*NSET,NSET=N1
262
*STEP
*STATIC
*BOUNDARY
262,1,1,.5
*NODE PRINT,NSET=NALL
U,RF
*NODE PRINT,NSET=N1
RF
*EL PRINT,ELSET=EALL
S,E,ENER
*END STEP
