**
**   Structure: Cantilever beam under tensile forces
**   Test Objective: Nonlinear dynamic response of a plastic material;
**                   material; explicit procedure
**
*HEADING
Model: beam     Date: 10-Mar-1998
*NODE,NSET=NALL
     1,      0.000000,      0.000000,      0.000000
     2,      1.000000,      0.000000,      0.000000
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*ELEMENT, TYPE=C3D20R   , ELSET=B1
     1,     1,    10,    95,    19,    61,   105,   222,   192,     9,    93,
           94,    20,   104,   220,   221,   193,    62,   103,   219,   190
     2,    10,     2,    13,    95,   105,    34,   134,   222,    11,    12,
           96,    93,   106,   133,   223,   220,   103,    33,   132,   219
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*NSET, NSET=CN7
    97,    96,    95,    94,    93,    20
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*BOUNDARY
95,1,2
*BOUNDARY
13,2,2
*BOUNDARY
CN7, 3
*ELSET,ELSET=EALL,GENERATE
1,32
*MATERIAL,NAME=EL
*ELASTIC
  210000.0,       .3
*PLASTIC
15.,0.
4050.,1.
*DENSITY
7.8E-9
*SOLID SECTION,MATERIAL=EL,ELSET=EALL
*AMPLITUDE,NAME=A1
0.,0.,1.E-5,1.,2.E-5,1.
*NSET,NSET=N1
100
*NSET,NSET=N2
22,25,28,31
*NSET,NSET=N3
5,6,7,8
*NSET,NSET=N4
21,23,24,26,27,29,30,32
*NSET,NSET=N5
98,99,101,102
*STEP,INC=40000,NLGEOM
*DYNAMIC,EXPLICIT
.5E-6,1.E-6
*CLOAD,AMPLITUDE=A1
N1,3,-4.
N2,3,-2.
N3,3,-1.
N4,3,4.
N5,3,8.
*NODE PRINT,NSET=NALL,FREQUENCY=30
U
*EL PRINT,ELSET=EALL
S,PEEQ
*END STEP
