**
**   Structure: cantilever beam.
**   Test objective: arbitrary temperature field;
**   material properties are not temperature dependent.
**
*HEADING
Model: beam     Date: 10-Mar-1998
*NODE
     1,      0.000000,      0.000000,      0.000000
     2,      1.000000,      0.000000,      0.000000
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*ELEMENT, TYPE=C3D20R   , ELSET=B1
     1,     1,    10,    95,    19,    61,   105,   222,   192,     9,    93,
           94,    20,   104,   220,   221,   193,    62,   103,   219,   190
     2,    10,     2,    13,    95,   105,    34,   134,   222,    11,    12,
           96,    93,   106,   133,   223,   220,   103,    33,   132,   219
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*NSET,NSET=FIX
1,2,3,4,9,10
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*BOUNDARY
FIX,1,3
*NSET,NSET=NALL,GENERATE
1,261
*NSET,NSET=N1,GENERATE
1,25
*NSET,NSET=N2,GENERATE
26,50
*NSET,NSET=N3,GENERATE
51,75
*NSET,NSET=N4,GENERATE
76,100
*NSET,NSET=N5,GENERATE
101,125
*NSET,NSET=N6,GENERATE
126,150
*NSET,NSET=N7,GENERATE
151,175
*NSET,NSET=N8,GENERATE
176,200
*NSET,NSET=N9,GENERATE
201,225
*NSET,NSET=N10,GENERATE
226,261
*ELSET,ELSET=EALL,GENERATE
1,32
*INITIAL CONDITIONS,TYPE=TEMPERATURE
NALL,293.
*MATERIAL,NAME=EL
*ELASTIC,TYPE=ISOTROPIC
2.05E5,0.3,293.
*EXPANSION,TYPE=ISO,ZERO=293.
11.5E-6,373.
*DENSITY
8.54E-9
*SOLID SECTION,ELSET=EALL,MATERIAL=EL
*STEP
*STATIC
*TEMPERATURE
N1,300.
N2,400.
N3,500.
N4,600.
N5,700.
N6,800.
N7,900.
N8,1000.
N9,1100.
N10,1200.
*NODE PRINT,NSET=NALL
U
*EL PRINT,ELSET=EALL
S
*END STEP
