**
**   Structure: bolt through two plates
**   Test objective: contact.
**
*NODE, NSET=Nall
       1,  3.54900e+02,  3.51442e+02,  0.00000e+00
       2,  3.55450e+02,  3.51442e+02,  0.00000e+00
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*ELEMENT, TYPE=CPS8R, ELSET=Ebolt
     1,      1,      4,      3,      2,      8,      7,      6,      5
     2,      4,     10,      9,      3,     13,     12,     11,      7
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*ELEMENT, TYPE=CAX8R, ELSET=Eplateful
   257,    850,    853,    852,    851,    857,    856,    855,    854
   258,    853,    859,    858,    852,    862,    861,    860,    856
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*ELEMENT, TYPE=CAX8R, ELSET=Eplatered
   261,    869,    874,    873,    868,    877,    876,    875,    871
   262,    874,    879,    878,    873,    882,    881,    880,    876
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*NSET,NSET=Nbolt
   1,
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*MATERIAL,NAME=STEEL
*ELASTIC
   210000.,.3
*DENSITY
   7.8E-9
*EXPANSION
   12.E-6
*MATERIAL,NAME=STEELRED
*ELASTIC
   210000.,.3
*DENSITY
   7.605e-9
*EXPANSION
   12.E-6
*SOLID SECTION,ELSET=Ebolt,MATERIAL=STEEL
   110.4584
*SOLID SECTION,ELSET=Eplateful,MATERIAL=STEEL
*SOLID SECTION,ELSET=Eplatered,MATERIAL=STEELRED
*SURFACE,NAME=PLATELL
   257, S1
   258, S1
   259, S1
   260, S1
   261, S1
   262, S1
   263, S1
   264, S1
   265, S1
   266, S1
   267, S1
   268, S1
*SURFACE,NAME=PLATELR
   293, S3
   294, S3
   295, S3
   296, S3
   297, S3
   298, S3
   299, S3
   300, S3
   301, S3
   302, S3
   303, S3
   304, S3
*SURFACE,NAME=PLATERR
   341, S3
   342, S3
   343, S3
   344, S3
   345, S3
   346, S3
   347, S3
   348, S3
   349, S3
   350, S3
   351, S3
   352, S3
*SURFACE,NAME=PLATERL,TYPE=NODE
   1202,
   1203,
   1029,
   1033,
   1035,
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   1087,
*SURFACE,NAME=BOLTL,TYPE=NODE
   39,
   42,
   67,
   69,
   324,
   325,
   327,
   328,
*SURFACE,NAME=BOLTR,TYPE=NODE
   538,
   541,
   580,
   582,
   799,
   802,
   804,
   807,
*CONTACT PAIR,INTERACTION=I1,TYPE=NODE TO SURFACE
   BOLTL,PLATELL
*CONTACT PAIR,INTERACTION=I1,TYPE=NODE TO SURFACE
   PLATERL,PLATELR
*CONTACT PAIR,INTERACTION=I1,TYPE=NODE TO SURFACE
   BOLTR,PLATERR
*SURFACE INTERACTION,NAME=I1
*SURFACE BEHAVIOR,PRESSURE-OVERCLOSURE=EXPONENTIAL
   1.E-4,.1
*INITIAL CONDITIONS,TYPE=TEMPERATURE
   Nall,273.
   Nbolt,373.
*BOUNDARY
   989,2,2
   1024,2,2
   427,1,1
*STEP,NLGEOM
*STATIC
   1.,1.
*DLOAD
   257,P1,.25
   258,P1,.25
   259,P1,.25
   260,P1,.25
   261,P1,.25
   262,P1,.25
   263,P1,.25
   264,P1,.25
   265,P1,.25
   266,P1,.25
   267,P1,.25
   268,P1,.25
*NODE PRINT,NSET=Nall
   U
*EL PRINT,ELSET=Eplatered
   S
*EL PRINT,ELSET=Eplateful
   S
*END STEP
