**
**   Structure: NACA0012 Airfoil.
**   Test objective: compressible, viscous, laminar, 3D fluid flow.
**
**   Reference: S. Mittal, Finite element commputation of unsteady
**              viscous compressible flows, Comput. Meth. Appl. Mech. Eng.
**              (157), 151-175 (1998).
**
*NODE, NSET=Nall
       1,7.599999999999e-04,-1.412800000000e-01,7.375285278333e-17
       2,-1.580784004032e-02,-1.348329387555e-01,1.626845359814e-16
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*ELEMENT, TYPE=F3D8, ELSET=Eall
     1,     1,     2,     3,     4,     5,     6,     7,     8
     2,     5,     6,     7,     8,     9,    10,    11,    12
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** Surfaces based on in
*SURFACE, NAME=Sin
201, S6
1710, S6
202, S6
203, S6
204, S6
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1709, S6
** Surfaces based on out
*SURFACE, NAME=Sout
1810, S2
2010, S6
1820, S2
1830, S2
1840, S2
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2390, S2
** Surfaces based on wall
*SURFACE, NAME=SOLIDSURFACE
10, S2
391, S4
20, S2
30, S2
40, S2
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709, S6
** Surfaces based on sliding
*SURFACE, NAME=Ssliding
1, S3
110, S3
301, S3
891, S3
11, S3
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2390, S5
*MATERIAL,NAME=AIR
*CONDUCTIVITY
5.e-4
*FLUID CONSTANTS
1.,5.e-4,293.
*SPECIFIC GAS CONSTANT
0.285714286d0
*SOLID SECTION,ELSET=Eall,MATERIAL=AIR
*PHYSICAL CONSTANTS,ABSOLUTE ZERO=0.
*INITIAL CONDITIONS,TYPE=FLUID VELOCITY
Nall,1,1.d0
Nall,2,0.d0
Nall,3,0.d0
*INITIAL CONDITIONS,TYPE=PRESSURE
Nall,0.98863075
*INITIAL CONDITIONS,TYPE=TEMPERATURE
Nall,3.46020761
*VALUES AT INFINITY
3.46020761,1,0.98863075,1.,1.
**
*STEP,INCF=10000
*CFD,COMPRESSIBLE,SCHEME=MODSMART,SIMPLEC,STEADY STATE,2D
1.e10,1.e10,,,2.e-3
*CONTROLS,PARAMETERS=CFD
20,0,0,4
*BOUNDARYF
Sin,S,11,,3.46020761
Sin,S,1,,1.000000
Sin,S,2,3,0.000000
Sin,S,8,,0.98863075
SOLIDSURFACE,S,1,3,0.
*MASS FLOW
Ssliding,M,0.
*DFLUX
SOLIDSURFACE,S,0.
Ssliding,S,0.
*NODE FILE,FREQUENCYF=10000
MACH,VF,TSF,PSF
*END STEP
