**
**   Structure: two cantilever beams.
**   Test objective: explicit dynamics with contact
**
*NODE, NSET=Nall
       1,  1.00000e+00,  1.00000e+00, -5.96046e-08
       2,  1.00000e+00,  5.00000e-01, -5.96046e-08
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*ELEMENT, TYPE=C3D20, ELSET=Eall
     1,     1,     2,     3,     4,     5,     6,     7,     8,     9,    10,
          11,    12,    17,    18,    19,    20,    13,    14,    15,    16
     2,     2,    21,    22,     3,     6,    23,    24,     7,    25,    26,
          27,    10,    30,    31,    32,    18,    14,    28,    29,    15
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*NSET,NSET=Nfix
1,
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*BOUNDARY
Nfix,1,3
*MATERIAL,NAME=EL
*ELASTIC
210000.,.3
*DENSITY
7.8E-9
*SOLID SECTION,ELSET=Eall,MATERIAL=EL
*SURFACE,NAME=Smast
1, S6
5, S6
3, S6
7, S6
9, S6
11, S6
13, S6
15, S6
17, S6
19, S6
21, S6
23, S6
25, S6
27, S6
29, S6
31, S6
*SURFACE,NAME=Sslav
38, S4
40, S4
42, S4
44, S4
46, S4
48, S4
50, S4
52, S4
54, S4
56, S4
58, S4
60, S4
62, S4
64, S4
*CONTACT PAIR,INTERACTION=SI1,TYPE=SURFACE TO SURFACE
Sslav,Smast
*SURFACE INTERACTION,NAME=SI1
*SURFACE BEHAVIOR,PRESSURE-OVERCLOSURE=LINEAR
1.E7,1.
*STEP,NLGEOM,INC=10000
*DYNAMIC,EXPLICIT
1.E-4,1.E-4
*CLOAD
395,2,-100
*NODE PRINT,NSET=Nall,FREQUENCY=100
U
*NODE FILE
U
*END STEP
