**
**   Structure: cantilever beam.
**   Test objective: frequency sensitivity w.r.t the geometry
**
*HEADING
Model: beam     Date: 10-Mar-1998
*NODE
     1,      0.000000,      0.000000,      0.000000
     2,      1.000000,      0.000000,      0.000000
     3,      1.000000,      1.000000,      0.000000
     4,      0.000000,      1.000000,      0.000000
     5,      0.000000,      0.000000,      8.000000
     6,      1.000000,      0.000000,      8.000000
     7,      1.000000,      1.000000,      8.000000
     8,      0.000000,      1.000000,      8.000000
     9,      0.250000,      0.000000,      0.000000
    10,      0.500000,      0.000000,      0.000000
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*ELEMENT, TYPE=C3D8  , ELSET=Eall
     1,     1,    10,    95,    19,    61,   105,   222,   192,     9,    93,
     2,    10,     2,    13,    95,   105,    34,   134,   222,    11,    12,
     3,    19,    95,    16,     4,   192,   222,   163,    79,    94,    97,
     4,    95,    13,     3,    16,   222,   134,    64,   163,    96,    14,
     5,    61,   105,   222,   192,    59,   109,   228,   196,   104,   220,
     6,   105,    34,   134,   222,   109,    36,   138,   228,   106,   133,
     7,   192,   222,   163,    79,   196,   228,   167,    81,   221,   224,
     8,   222,   134,    64,   163,   228,   138,    66,   167,   223,   135,
     9,    59,   109,   228,   196,    57,   113,   234,   200,   108,   226,
    10,   109,    36,   138,   228,   113,    38,   142,   234,   110,   137,
    11,   196,   228,   167,    81,   200,   234,   171,    83,   227,   230,
    12,   228,   138,    66,   167,   234,   142,    68,   171,   229,   139,
    13,    57,   113,   234,   200,    55,   117,   240,   204,   112,   232,
    14,   113,    38,   142,   234,   117,    40,   146,   240,   114,   141,
    15,   200,   234,   171,    83,   204,   240,   175,    85,   233,   236,
    16,   234,   142,    68,   171,   240,   146,    70,   175,   235,   143,
    17,    355,   417,   540,   504,    53,   121,   246,   208,   116,   238,
    18,   417,    340,   446,   540,   121,    42,   150,   246,   118,   145,
    19,   504,   540,   475,    385,   208,   246,   179,    87,   239,   242,
    20,   540,   446,    370,   475,   246,   150,    72,   179,   241,   147,
    21,    53,   121,   246,   208,    51,   125,   252,   212,   120,   244,
    22,   121,    42,   150,   246,   125,    44,   154,   252,   122,   149,
    23,   208,   246,   179,    87,   212,   252,   183,    89,   245,   248,
    24,   246,   150,    72,   179,   252,   154,    74,   183,   247,   151,
    25,    51,   125,   252,   212,    49,   129,   258,   216,   124,   250,
    26,   125,    44,   154,   252,   129,    46,   158,   258,   126,   153,
    27,   212,   252,   183,    89,   216,   258,   187,    91,   251,   254,
    28,   252,   154,    74,   183,   258,   158,    76,   187,   253,   155,
    29,    49,   129,   258,   216,     5,    22,   100,    31,   128,   256,
    30,   129,    46,   158,   258,    22,     6,    25,   100,   130,   157,
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*EQUATION
2
355,1,1.,55,1,-1.
2
355,2,1.,55,2,-1.
2
355,3,1.,55,3,-1.
2
417,1,1.,117,1,-1.
2
417,2,1.,117,2,-1.
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*NSET, NSET=FIX
    97,    96,    95,    94,    93,    20,    19,    18,    17,    16,    15,
    14,    13,    12,    11,    10,     9,     4,     3,     2,     1
*BOUNDARY
FIX, 1
*BOUNDARY
FIX, 2
*BOUNDARY
FIX, 3
*NSET,NSET=Nall,GENERATE
1,261
*MATERIAL,NAME=EL
*ELASTIC
  210000.0,        .3
*DENSITY
7.8E-9
*DESIGNVARIABLES,TYPE=COORDINATE
Nall
*SOLID SECTION,ELSET=Eall,MATERIAL=EL
*STEP
*STATIC
*CLOAD
100,3,1.E5
*NODE FILE
U
*END STEP
*STEP,PERTURBATION
*FREQUENCY,STORAGE=YES
10
*NODE FILE
U
*END STEP
*STEP,NLGEOM
*SENSITIVITY
*OBJECTIVE
EIGENFREQUENCY
*FILTER,EDGE PRESERVATION=YES
*NODE FILE
SEN
*END STEP
