**
**   Structure: cantilever beam.
**   Test objective: reading temperatures from a frd-file;
**                   uses output from beamfrdwrite, so
**                   beamfrdwrite must be run first.
**
*HEADING
Model: beam     Date: 10-Mar-1998
*NODE,NSET=Nall
     1,      0.000000,      0.000000,      0.000000
     2,      1.000000,      0.000000,      0.000000
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*ELEMENT, TYPE=C3D20R   , ELSET=Eall
     1,     1,    10,    95,    19,    61,   105,   222,   192,     9,    93,
           94,    20,   104,   220,   221,   193,    62,   103,   219,   190
     2,    10,     2,    13,    95,   105,    34,   134,   222,    11,    12,
           96,    93,   106,   133,   223,   220,   103,    33,   132,   219
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*NSET, NSET=FIX
    97,    96,    95,    94,    93,    20
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*MATERIAL,NAME=EL
*ELASTIC
210000.,.3
*EXPANSION,ZERO=0.
1.E-6
*SOLID SECTION,ELSET=Eall,MATERIAL=EL
*INITIAL CONDITIONS,TYPE=TEMPERATURE
Nall,0.
*BOUNDARY
FIX,1,3
*STEP
*STATIC
*TEMPERATURE,FILE=beamfrdwrite.frd,BSTEP=2
*NODE FILE
U
*END STEP
*STEP
*STATIC
*TEMPERATURE,FILE=beamfrdwrite.frd
*NODE FILE
U
*END STEP
