**
**   Structure: cantilever beam.
**   Test objective: nonlinear dynamic response to a constant
**                   impact; implicit procedure.
**                   Variable increment size
**
*HEADING
Model: beam     Date: 10-Mar-1998
*NODE,NSET=NALL
     1,      0.000000,      0.000000,      0.000000
     2,      1.000000,      0.000000,      0.000000
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*ELEMENT, TYPE=C3D20   , ELSET=B1
     1,     1,    10,    95,    19,    61,   105,   222,   192,     9,    93,
           94,    20,   104,   220,   221,   193,    62,   103,   219,   190
     2,    10,     2,    13,    95,   105,    34,   134,   222,    11,    12,
           96,    93,   106,   133,   223,   220,   103,    33,   132,   219
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*NSET, NSET=CN7
    97,    96,    95,    94,    93,    20
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*BOUNDARY
CN7, 1
*BOUNDARY
CN7, 2
*BOUNDARY
CN7, 3
*ELSET,ELSET=EALL,GENERATE
1,32
*MATERIAL,NAME=EL
*ELASTIC
  210000.0 ,       .3
*DENSITY
7.8E-9
*SOLID SECTION,MATERIAL=EL,ELSET=EALL
*NSET,NSET=N1
100
*NSET,NSET=LAST
5,6,7,8,21,22
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*AMPLITUDE,NAME=A1
0.,1.,1.E-4,1.
*AMPLITUDE,NAME=A2
0.,0.,2.E-5,1.,4.E-5,2.,5.E-5,3.,
6.E-5,.5,8.E-5,4.,10.E-5,2.
*STEP,INC=100000,NLGEOM
*DYNAMIC
.5E-5,.5E-5
*CLOAD,AMPLITUDE=A1
LAST,2,-1.
*NODE PRINT,NSET=NALL,FREQUENCY=100
U
*EL PRINT,ELSET=EALL,FREQUENCY=100
S
*END STEP
