**
**   Structure: Cantilever beam under tensile forces
**   Test Objective: Nonlinear dynamic response of a plastic material;
**                   material; explicit procedure
**
*HEADING
Model: beam     Date: 10-Mar-1998
*NODE
     1,      0.000000,      0.000000,      0.000000
     2,      1.000000,      0.000000,      0.000000
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*ELEMENT, TYPE=C3D8, ELSET=Eall
     1,     1,    10,    95,    19,    61,   105,   222,   192
     2,    10,     2,    13,    95,   105,    34,   134,   222
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** Names based on fix
*NSET,NSET=Nfix
1,
2,
3,
4,
10,
13,
16,
19,
95,
*BOUNDARY
1,1,2
2,2,2
Nfix, 3
*ELSET,ELSET=EALL,GENERATE
1,32
*MATERIAL,NAME=EL
*ELASTIC
  210000.0,        .3
*PLASTIC
15.,0.
4050.,1.
*DENSITY
7.8E-9
*SOLID SECTION,MATERIAL=EL,ELSET=EALL
*NSET,NSET=N1
100
*STEP,INC=100000,NLGEOM
*DYNAMIC,EXPLICIT
1.E-8,5.E-6
*DLOAD
29,P2,-100.
30,P2,-100.
31,P2,-100.
32,P2,-100.
*NODE PRINT,NSET=N1
U
*END STEP
