**
**   Structure: fluid flow between two plates.
**   Test objective: stationary incompressible Couette
**                   with fixed wall temperature.
**                   velocity:linear between 0. and 1.
**                   temperature: maximum of 1.125
**
*NODE, NSET=Nall
       1,1.000000000000e-01,1.000000000000e+00,0.000000000000e+00
       2,1.000000000000e-01,9.500000000000e-01,0.000000000000e+00
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*ELEMENT, TYPE=F3D8R, ELSET=Eall
     1,     1,     2,     3,     4,     5,     6,     7,     8
     2,     2,     9,    10,     3,     6,    11,    12,     7
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** Surfaces based on mast
*SURFACE, NAME=Smast
1, S1
2, S1
3, S1
4, S1
5, S1
6, S1
7, S1
8, S1
9, S1
10, S1
11, S1
12, S1
13, S1
14, S1
15, S1
16, S1
17, S1
18, S1
19, S1
20, S1
** Surfaces based on slav
*SURFACE, NAME=Sslav
1, S2
2, S2
3, S2
4, S2
5, S2
6, S2
7, S2
8, S2
9, S2
10, S2
11, S2
12, S2
13, S2
14, S2
15, S2
16, S2
17, S2
18, S2
19, S2
20, S2
*TIE,FLUIDPERIODIC,NAME=T1
Sslav,Smast
*CYCLIC SYMMETRY MODEL,TIE=T1
0.1,0.,0.
*SURFACE,NAME=SOLIDSURFACE
1,S6
20,S4
*ELSET,ELSET=E1
1,2,3,4,5,6
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*MATERIAL,NAME=WATER
*DENSITY
1.
*FLUID CONSTANTS
1.,1.
*CONDUCTIVITY
1.
*SOLID SECTION,ELSET=Eall,MATERIAL=WATER
*INITIAL CONDITIONS,TYPE=PRESSURE
Nall,1.
*INITIAL CONDITIONS,TYPE=TEMPERATURE
Nall,1.
*INITIAL CONDITIONS,TYPE=FLUID VELOCITY
Nall,1,0.
Nall,2,0.
Nall,3,0.
*STEP,INCF=1000
*CFD,STEADY STATE,2D
1.,1.,,,0.01
*BOUNDARYF
1,S6,1,1,1.
1,S6,2,3,0.
1,S6,11,11,1.
20,S4,1,3,0.
20,s4,11,11,1.
E1,S3,3,3,0.
E1,S5,3,3,0.
*NODE PRINT,FREQUENCYF=1000,NSET=Nall
VF,TSF
*END STEP
