**
**   Structure: spring + mass + dashpot.
**   Test objective: dynamic calculation of a spring-mass-dashpot
**                   system
**                   spring=10.,damping factor c=1.e-5,mass=6.24e-11
**                   half period=8.01e-6, max=0.6105
**
*NODE,NSET=NALL
1,0.,0.,0.
2,1.,0.,0.
3,1.,-.1,.1
4,1.2,-.1,.1
5,1.2,-.1,-.1
6,1.,-.1,-.1
7,1.,.1,.1
8,1.2,.1,.1
9,1.2,.1,-.1
10,1.,.1,-.1
*ELEMENT,TYPE=SPRINGA,ELSET=ESPRING
1,1,2
*ELEMENT,TYPE=C3D8,ELSET=EMASSA
2,3,4,5,6,7,8,9,10
*ELEMENT,TYPE=DASHPOTA,ELSET=EDASH
3,1,2
*BOUNDARY
1,1,3
2,2,3
*NSET,NSET=NMASSA,GENERATE
3,10
*NSET,NSET=N2
2
*BOUNDARY
NMASSA,2,3
*SPRING,ELSET=ESPRING

10.
*DASHPOT,ELSET=EDASH

1.e-5
*MATERIAL,NAME=EL
*ELASTIC
210000.,.3
*DENSITY
7.8E-9
*SOLID SECTION,ELSET=EMASSA,MATERIAL=EL
*EQUATION
2
3,1,1.,2,1,-1.
*EQUATION
2
4,1,1.,2,1,-1.
*EQUATION
2
5,1,1.,2,1,-1.
*EQUATION
2
6,1,1.,2,1,-1.
*EQUATION
2
7,1,1.,2,1,-1.
*EQUATION
2
8,1,1.,2,1,-1.
*EQUATION
2
9,1,1.,2,1,-1.
*EQUATION
2
10,1,1.,2,1,-1.
*STEP,INC=400
*DYNAMIC,direct
1.e-7,1.e-5
*CLOAD
4,1,1.
5,1,1.
8,1,1.
9,1,1.
*NODE print,nset=nall,frequency=10
U
*NODE print,nset=nall,frequency=10
V
*END STEP
