**
**   Structure: furnace.
**   Test objective: shell elements with convection and radiation.
**
*NODE, NSET=Nall
       1,  3.00000e-01,  3.72529e-09,  3.72529e-09
       2,  2.40000e-01,  3.72529e-09,  3.72529e-09
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*ELEMENT, TYPE=S6, ELSET=furnace
     1,      1,      2,      3,      4,      5,      6
     2,      3,      2,      7,      5,      8,      9
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*ELEMENT,TYPE=D,ELSET=EGAS
301,603,609,604
302,604,610,605
303,605,611,606
304,606,612,607
305,607,613,608
*NSET,NSET=NGAS,GENERATE
603,608
*NSET,NSET=Ndown
1,
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*PHYSICAL CONSTANTS,ABSOLUTE ZERO=0.,STEFAN BOLTZMANN=5.669E-8
*MATERIAL,NAME=STEEL
*DENSITY
7800.
*CONDUCTIVITY
50.
*SPECIFIC HEAT
446.
*SHELL SECTION,ELSET=furnace,MATERIAL=STEEL
0.01
*MATERIAL,NAME=GAS
*DENSITY
1.
*SPECIFIC HEAT
1000.
*FLUID SECTION,ELSET=EGAS,MATERIAL=GAS
*INITIAL CONDITIONS,TYPE=TEMPERATURE
Nall,300.
*AMPLITUDE,NAME=A1
0.,.3,1.,1.
*STEP,INC=100
*HEAT TRANSFER
0.1,1.
*VIEWFACTOR,WRITE
*BOUNDARY,AMPLITUDE=A1
Ndown,11,11,1000.
*BOUNDARY
603,11,11,300.
*BOUNDARY,MASS FLOW
609,1,1,0.001
610,1,1,0.001
611,1,1,0.001
612,1,1,0.001
613,1,1,0.001
*RADIATE
1, R1CR,1000., 1.000000e+00
2, R1CR,1000., 1.000000e+00
3, R1CR,1000., 1.000000e+00
4, R1CR,1000., 1.000000e+00
5, R1CR,1000., 1.000000e+00
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100, R2, 300.000000, 8.000000e-01
*FILM
51, F2FC, 604, 2.500000e+01
52, F2FC, 604, 2.500000e+01
53, F2FC, 604, 2.500000e+01
54, F2FC, 604, 2.500000e+01
55, F2FC, 604, 2.500000e+01
56, F2FC, 604, 2.500000e+01
57, F2FC, 604, 2.500000e+01
58, F2FC, 604, 2.500000e+01
59, F2FC, 604, 2.500000e+01
60, F2FC, 604, 2.500000e+01
61, F2FC, 605, 2.500000e+01
62, F2FC, 605, 2.500000e+01
63, F2FC, 605, 2.500000e+01
64, F2FC, 605, 2.500000e+01
65, F2FC, 605, 2.500000e+01
66, F2FC, 605, 2.500000e+01
67, F2FC, 605, 2.500000e+01
68, F2FC, 605, 2.500000e+01
69, F2FC, 605, 2.500000e+01
70, F2FC, 605, 2.500000e+01
71, F2FC, 606, 2.500000e+01
72, F2FC, 606, 2.500000e+01
73, F2FC, 606, 2.500000e+01
74, F2FC, 606, 2.500000e+01
75, F2FC, 606, 2.500000e+01
76, F2FC, 606, 2.500000e+01
77, F2FC, 606, 2.500000e+01
78, F2FC, 606, 2.500000e+01
79, F2FC, 606, 2.500000e+01
80, F2FC, 606, 2.500000e+01
81, F2FC, 607, 2.500000e+01
82, F2FC, 607, 2.500000e+01
83, F2FC, 607, 2.500000e+01
84, F2FC, 607, 2.500000e+01
85, F2FC, 607, 2.500000e+01
86, F2FC, 607, 2.500000e+01
87, F2FC, 607, 2.500000e+01
88, F2FC, 607, 2.500000e+01
89, F2FC, 607, 2.500000e+01
90, F2FC, 607, 2.500000e+01
91, F2FC, 608, 2.500000e+01
92, F2FC, 608, 2.500000e+01
93, F2FC, 608, 2.500000e+01
94, F2FC, 608, 2.500000e+01
95, F2FC, 608, 2.500000e+01
96, F2FC, 608, 2.500000e+01
97, F2FC, 608, 2.500000e+01
98, F2FC, 608, 2.500000e+01
99, F2FC, 608, 2.500000e+01
100, F2FC, 608, 2.500000e+01
*NODE PRINT,NSET=NGAS
NT
*END STEP
*STEP
*HEAT TRANSFER
10.,100.
*VIEWFACTOR,READ
*NODE PRINT,NSET=NGAS
NT
*END STEP
*STEP
*HEAT TRANSFER
10.,100.
*VIEWFACTOR,NO CHANGE
*NODE PRINT,NSET=NGAS
NT
*END STEP
