**
**   Structure: linear gas network
**   Test objective: Test of subcritical flow
**   in a single isothermal pipe (kg,m,s,K)
**   supercritical initial mass flow conditions
**
*HEADING
Model: linear net 3 elements Dtype
*NODE,NSET=NALL
1, 1, 0, 0
2, 2, 0, 0
3, 3, 0, 0
4, 4, 0, 0
5, 5, 0, 0
*ELEMENT, TYPE=D,ELSET=EGAS
2, 2, 3, 4
1, 0, 1, 2
3, 4, 5, 0
*MATERIAL,NAME=GAS
*SPECIFIC GAS CONSTANT
287.
*FLUID CONSTANTS
1.0022E3,1.69532E-05,270
1.0045E3,1.84135E-05,300
1.0131E3,2.28232E-05,400
1.0292E3,2.66931E-05,500
1.0506E3,3.01677E-05,600
1.0745E3,3.33396E-05,700
1.0982E3,3.62717E-05,800
1.1204E3,3.90084E-05,900
1.1405E3,4.15824E-05,1000
1.1583E3,4.40182E-05,1100
1.1739E3,4.63352E-05,1200
1.1976E3,4.85486E-05,1300
1.1997E3,5.06708E-05,1400
1.2104E3,5.27117E-05,1500
1.2199E3,5.46798E-05,1600
1.2284E3,5.65822E-05,1700
1.2361E3,5.84249E-05,1800
1.2431E3,6.02131E-05,1900
1.2495E3,6.19512E-05,2000
*FLUID SECTION,MATERIAL=GAS,ELSET=EGAS,TYPE=GAS PIPE FANNO ISOTHERMAL
706.8583E-6,30E-3,50E-3,0,1,0,0
*INITIAL CONDITIONS,TYPE=TEMPERATURE
2,819
4,819
*INITIAL CONDITIONS,TYPE=MASSFLOW
3,1.
*BOUNDARY
2,0,0,819
2,2,2,0.5443E6
4,2,2,0.54e6
*STEP,INC=100
*HEAT TRANSFER,STEADY STATE
1.,1.
*NODE PRINT, NSET=NALL,FREQUENCY=100
U,NT
*END STEP
