**
**   Structure: slender disk mounted on a long axis
**   Test objective: a static step in the relative system followed
**                   by a dynamic step in the absolute system
**
*NODE, NSET=Nall
       1,6.123233995737e-17,1.000000000000e+00,0.000000000000e+00
       2,3.826834323651e-01,9.238795325113e-01,0.000000000000e+00
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*ELEMENT, TYPE=C3D20, ELSET=Eall
     1,     1,     2,     3,     4,     5,     6,     7,     8,     9,    10,
          11,    12,    17,    18,    19,    20,    13,    14,    15,    16
     2,     4,     3,    21,    22,     8,     7,    23,    24,    11,    25,
          26,    27,    19,    30,    31,    32,    16,    15,    28,    29
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*NSET,NSET=Nfix
2657,
2658,
*EQUATION
17
281,1,1.,
206,1,1.,
131,1,1.,
6,1,1.,
5,1,1.,
559,1,1.,
484,1,1.,
359,1,1.,
358,1,1.,
859,1,1.,
784,1,1.,
659,1,1.,
658,1,1.,
1106,1,1.,
1031,1,1.,
956,1,1.,
2657,1,-16.
17
281,2,1.,
206,2,1.,
131,2,1.,
6,2,1.,
5,2,1.,
559,2,1.,
484,2,1.,
359,2,1.,
358,2,1.,
859,2,1.,
784,2,1.,
659,2,1.,
658,2,1.,
1106,2,1.,
1031,2,1.,
956,2,1.,
2657,2,-16.
17
281,3,1.,
206,3,1.,
131,3,1.,
6,3,1.,
5,3,1.,
559,3,1.,
484,3,1.,
359,3,1.,
358,3,1.,
859,3,1.,
784,3,1.,
659,3,1.,
658,3,1.,
1106,3,1.,
1031,3,1.,
956,3,1.,
2657,3,-16.
17
1637,1,1.,
2267,1,1.,
2337,1,1.,
2407,1,1.,
2034,1,1.,
2033,1,1.,
2107,1,1.,
2177,1,1.,
1754,1,1.,
1753,1,1.,
1827,1,1.,
1897,1,1.,
1424,1,1.,
1423,1,1.,
1497,1,1.,
1567,1,1.,
2658,1,-16.
17
1637,2,1.,
2267,2,1.,
2337,2,1.,
2407,2,1.,
2034,2,1.,
2033,2,1.,
2107,2,1.,
2177,2,1.,
1754,2,1.,
1753,2,1.,
1827,2,1.,
1897,2,1.,
1424,2,1.,
1423,2,1.,
1497,2,1.,
1567,2,1.,
2658,2,-16.
17
1637,3,1.,
2267,3,1.,
2337,3,1.,
2407,3,1.,
2034,3,1.,
2033,3,1.,
2107,3,1.,
2177,3,1.,
1754,3,1.,
1753,3,1.,
1827,3,1.,
1897,3,1.,
1424,3,1.,
1423,3,1.,
1497,3,1.,
1567,3,1.,
2658,3,-16.
*BOUNDARY
Nfix,1,3
*Solid Section, elset=Eall, material=steel
*Material, name=STEEL
*Elastic
 210000., 0.3
*DENSITY
7.8e-9
*AMPLITUDE,NAME=279x
 0.00000000D+00, 0.00000000D+00
 0.10000000D-04,-0.44663511D-01
*AMPLITUDE,NAME=279y
 0.00000000D+00, 0.00000000D+00
 0.10000000D-04, 0.29552021D+00
*AMPLITUDE,NAME=1x
 0.00000000D+00, 0.00000000D+00
 0.10000000D-04,-0.29552021D+00
*AMPLITUDE,NAME=1y
 0.00000000D+00, 0.00000000D+00
 0.10000000D-04,-0.44663511D-01
*AMPLITUDE,NAME=354x
 0.00000000D+00, 0.00000000D+00
 0.10000000D-04, 0.44663511D-01
*AMPLITUDE,NAME=354y
 0.00000000D+00, 0.00000000D+00
 0.10000000D-04,-0.29552021D+00
*AMPLITUDE,NAME=654x
 0.00000000D+00, 0.00000000D+00
 0.10000000D-04, 0.29552021D+00
*AMPLITUDE,NAME=654y
 0.00000000D+00, 0.00000000D+00
 0.10000000D-04, 0.44663511D-01
** Names based on disk
*Step,nlgeom
*static
1.e-10,1.e-10
*dload
Eall,CENTRIF,9.e8,0.,0.,0.,0.,0.,1.
*boundary
279,1,3
1,1,3
354,1,3
654,1,3
*el file
ener
*end step
*Step,nlgeom,inc=1000000
*dynamic,relative to absolute
1.5e-6,4.5e-6,,1.75e-5
*boundary,amplitude=279x
279,1,1,1.
*boundary,amplitude=279y
279,2,2,1.
*boundary
279,3
*boundary,amplitude=1x
1,1,1,1.
*boundary,amplitude=1y
1,2,2,1.
*boundary
1,3
*boundary,amplitude=354x
354,1,1,1.
*boundary,amplitude=354y
354,2,2,1.
*boundary
354,3
*boundary,amplitude=654x
654,1,1,1.
*boundary,amplitude=654y
654,2,2,1.
*boundary
654,3
*node file,frequency=3
u,v
*el file,frequency=3
*end step
