**
**   Structure: cantilever beam.
**   Test objective: sensitivity analysis of the stress
**                   in a simply supported beam subject to
**                   a point force in the middle;
**                   this file is part of an optimization exercise
**                   consisting of files opt1.inp,opt1.f,opt2.inp,
**                   opt2.f and opt3.inp (cf. User's manual).
**
*HEADING
Model: beam     Date: 10-Mar-1998
*NODE
     1,      0.000000,      0.000000,      0.000000
     2,      1.000000,      0.000000,      0.000000
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*ELEMENT, TYPE=C3D20R   , ELSET=Eall
     1,     1,    10,    95,    19,    61,   105,   222,   192,     9,    93,
           94,    20,   104,   220,   221,   193,    62,   103,   219,   190
     2,    10,     2,    13,    95,   105,    34,   134,   222,    11,    12,
           96,    93,   106,   133,   223,   220,   103,    33,   132,   219
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*NSET,NSET=DESIGNNODES
1,
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*DESIGNVARIABLES,TYPE=COORDINATE
DESIGNNODES
*MATERIAL,NAME=EL
*ELASTIC
  210000.0,        .3
*DENSITY
7.8E-9
*SOLID SECTION,ELSET=Eall,MATERIAL=EL
*STEP
*STATIC
*BOUNDARY
3,1,3
4,2,3
7,1,2
8,2,2
*CLOAD
117,2,10.
*NODE FILE
U
*EL FILE
S
*END STEP
*STEP
*SENSITIVITY
*OBJECTIVE
STRESS,DESIGNNODES,10.,100.
*FILTER,TYPE=LINEAR,EDGE PRESERVATION=YES,DIRECTION WEIGHTING=YES
3.
*CONSTRAINT
MASS,Eall,LE,1.,
*NODE FILE
SEN
*END STEP
