**
**   Structure: slender disk mounted on a long axis
**   Test objective: *COMPLEX FREQUENCY,
**                   output of moments of inertia.
**
*NODE, NSET=Nall
       1,6.123233995737e-17,1.000000000000e+00,0.000000000000e+00
       2,3.826834323651e-01,9.238795325113e-01,0.000000000000e+00
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*ELEMENT, TYPE=C3D20R, ELSET=Eall
     1,     1,     2,     3,     4,     5,     6,     7,     8,     9,    10,
          11,    12,    17,    18,    19,    20,    13,    14,    15,    16
     2,     4,     3,    21,    22,     8,     7,    23,    24,    11,    25,
          26,    27,    19,    30,    31,    32,    16,    15,    28,    29
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*NSET,NSET=Nfix
14,
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*BOUNDARY
Nfix,1,3
*Solid Section, elset=Eall, material=steel
*Material, name=STEEL
*Elastic
 210000., 0.3
*DENSITY
7.8e-9
** Names based on disk
*ELSET,ELSET=Edisk
161,
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*Step,nlgeom
*Static
*dload
Eall,centrif,3.0853e8,0.,0.,0.,0.,0.,1.
*el print,elset=Edisk,TOTALS=ONLY
EVOL,EMAS
*end step
*step,perturbation
*frequency,STORAGE=YES
 10,
*el print
*end step
*step,perturbation
*complex frequency,coriolis
 10,
*end step
