**
**   Structure: linear gas network
**   Test objective: Test of subcritical flow
**   in a two rotating adiabatic pipes (kg,m,s,K)
**   flow in first pipe is centrifugal, in the second
**   pipe centripetal
**  NOT REALLY CORRECT, SINCE IN THE ABSOLUTE SYSTEM
**
*HEADING
Model: linear net 3 elements Dtype
*NODE,NSET=NALL
1, 1, 0, 0
2, 2, 0, 0
3, 3, 0, 0
4, 4, 0, 0
5, 5, 0, 0
6, 6, 0, 0
7, 7, 0, 0
*ELEMENT, TYPE=D,ELSET=EINOUT
1, 0, 1, 2
4, 6, 7, 0
*ELEMENT, TYPE=D,ELSET=EGAS1
2, 2, 3, 4
*ELEMENT, TYPE=D,ELSET=EGAS2
3, 4, 5, 6
*MATERIAL,NAME=GAS
*SPECIFIC GAS CONSTANT
287.
*FLUID CONSTANTS
1.E3,1.69532E-05
*FLUID SECTION,MATERIAL=GAS,ELSET=EINOUT,TYPE=INOUT
*FLUID SECTION,MATERIAL=GAS,ELSET=EGAS1,TYPE=ROTATING GAS PIPE
706.8583E-6,706.8583E-6,50.E-3,0,1,,,10.E-3,60.E-3,10000.
*FLUID SECTION,MATERIAL=GAS,ELSET=EGAS2,TYPE=ROTATING GAS PIPE
706.8583E-6,706.8583E-6,50.E-3,0,1,,,60.E-3,10.E-3,10000.
*INITIAL CONDITIONS,TYPE=TEMPERATURE
2,819
*INITIAL CONDITIONS,TYPE=TOTAL PRESSURE
**4,1.E6
*BOUNDARY,MASS FLOW
1,1,1,0.5033e-1
3,1,1,0.5033e-1
5,1,1,0.5033e-1
7,1,1,0.5033e-1
*BOUNDARY
2,0,0,819
2,2,2,0.5443E6
*STEP,INC=10000
*HEAT TRANSFER,STEADY STATE
1.,1.
*NODE PRINT, NSET=NALL,FREQUENCY=100
U,NT
*END STEP
