**
**   Structure: cantilever beam.
**   Test objective: submodel: calculation of
**                   section forces; master model
**                   stored in double precision binary
**                   format
**
*HEADING
Model: beam     Date: 10-Mar-1998
*NODE, NSET=Nall
       1,0.000000000000e+00,0.000000000000e+00,0.000000000000e+00
       2,1.000000000000e+00,0.000000000000e+00,0.000000000000e+00
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*ELEMENT, TYPE=C3D20R, ELSET=Eall
     1,     1,    10,    95,    19,    61,   105,   222,   192,     9,    93,
          94,    20,   104,   220,   221,   193,    62,   103,   219,   190
     2,    10,     2,    13,    95,   105,    34,   134,   222,    11,    12,
          96,    93,   106,   133,   223,   220,   103,    33,   132,   219
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*MATERIAL,NAME=EL
*ELASTIC
  210000.0,        .3
*SOLID SECTION,ELSET=Eall,MATERIAL=EL
*NSET,NSET=Nsectionforce
5,
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*SUBMODEL,TYPE=NODE,INPUT=beampdouble.frd.ref
Nall
*STEP
*STATIC
*BOUNDARY,SUBMODEL,STEP=1
Nall,1,3
*NODE PRINT,NSET=Nsectionforce,totals=yes
RF
*END STEP
