**
**   Structure: plate in between 4 springs
**   Test objective: S8 elements, nodal forces on shells
**
*HEADING
Stability is developed by ESP Composites, LLC
*NODE, NSET=ALL
1,0,0
2,0.333333333333333,0
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*ELEMENT, TYPE=S8, ELSET=PLATE
1,1,3,203,201,2,103,202,101
2,3,5,205,203,4,105,204,103
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*ELEMENT, TYPE=SPRINGA, ELSET=SPRING
10001,10001,2829
10002,10002,2829
10003,10003,2803
10004,10004,2803
10005,10005,203
10006,10006,203
10007,10007,229
10008,10008,229
*NSET, NSET=BOTTOM, GENERATE
1,31,1
*NSET, NSET=RIGHT
31
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*NSET, NSET=TOP, GENERATE
3001,3031,1
*NSET, NSET=LEFT
1
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*BOUNDARY
ALL,3
*BOUNDARY
10001,1,3
10002,1,3
10003,1,3
10004,1,3
10005,1,3
10006,1,3
10007,1,3
10008,1,3
*SHELL SECTION, ELSET=PLATE, MATERIAL=A
0.5
*SPRING, ELSET=SPRING
100.0000
*MATERIAL, NAME=A
*ELASTIC, TYPE=ISO
10e6, .3
*NSET, NSET=MIDBOT, GENERATE
2,30,2
*NSET, NSET=MIDTOP, GENERATE
3002,3030,2
*NSET, NSET=END_BOT, GENERATE
1,31,2
*NSET, NSET=END_TOP, GENERATE
3001,3031,2
*STEP
*STATIC
*CLOAD
MIDBOT,2,-2
MIDTOP,2,2
END_BOT,2,-1
END_TOP,2,1
*CLOAD
1,2,.5
31,2,.5
3031,2,-.5
3001,2,-.5
*NODE PRINT,NSET=MIDBOT
U
*NODE PRINT,NSET=END_BOT
U
*EL PRINT,ELSET=PLATE
S
*END STEP
