*NODE
	1, 0.0, 10.0, 0.0
	2, 0.0, 5.0, 0.0
	3, 5.0, 5.0, 0.0
	4, 5.0, 10.0, 0.0
*ELEMENT, type=CPE4, ELSET=ALL
	1, 1, 2, 3, 4
*MATERIAL, NAME=STEEL
	*ELASTIC
		2e+5, 0.3
*SOLID SECTION, ELSET=ALL, MATERIAL=STEEL
	1000
*STEP
	*NO ANALYSIS
*END STEP
