*Node
	1, 0.0, 10.0, 0.
	2, 0.0,  5.0, 0.
	3, 5.0,  5.0, 0.
	4, 5.0, 10.0, 0.
	5, 0.0,  7.5, 0.
	6, 2.5,  5.0, 0.
	7, 5.0,  7.5, 0.
	8, 2.5, 10.0, 0.
*Element, type=S8, ELSET=ALL
	1, 1, 2, 3, 4, 5, 6, 7, 8
*MATERIAL, NAME=STEEL
	*ELASTIC
		2e+5, 0.3
*SHELL SECTION, ELSET=ALL, MATERIAL=STEEL
	0.1
*STEP
	*NO ANALYSIS
*END STEP
