**
**   Structure: straight conducting line within cube
**   Test objective: electromagnetic field
**
*NODE, NSET=Nall
       1,5.000000000000e-01,5.010000000000e-01,0.000000000000e+00
       2,5.003090169944e-01,5.009510565163e-01,0.000000000000e+00
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*ELEMENT, TYPE=S8, ELSET=Eall
     1,      1,      4,      3,      2,      8,      7,      6,      5
     2,      4,     10,      9,      3,     13,     12,     11,      7
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*ELEMENT, TYPE=C3D20R, ELSET=Eall
   101,   341,   342,   343,   344,   345,   346,   347,   348,   349,   350,
         351,   352,   357,   358,   359,   360,   353,   354,   355,   356
   102,   344,   343,   361,   362,   348,   347,   363,   364,   351,   365,
         366,   367,   359,   370,   371,   372,   356,   355,   368,   369
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*ELSET,ELSET=Ecoil
1,
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*ELSET,ELSET=Eair
101,
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*NSET,NSET=Nminus
1,
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*NSET,NSET=Nplus
24,
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*MATERIAL,NAME=STEEL
*ELECTRICAL CONDUCTIVITY
1.
*MATERIAL,NAME=AIR
*MAGNETIC PERMEABILITY
1.256e-6,1
*PHYSICAL CONSTANTS,ABSOLUTE ZERO=-273.15,STEFAN BOLTZMANN=5.669E-8
*SHELL SECTION,ELSET=Ecoil,MATERIAL=STEEL
1.e-5
*SOLID SECTION,ELSET=Eair,MATERIAL=AIR
*STEP
*ELECTROMAGNETICS,MAGNETOSTATICS
1.,1.
*BOUNDARY
Nplus,11,11,100.
Nminus,11,11,0.
*NODE FILE
POT
*EL FILE
ECD,EMFB
*END STEP
