**
**   Structure: cantilever beam.
**   Test objective: eigenfrequencies and eigenmodes.
**                   submodel
**
*HEADING
Model: beam     Date: 10-Mar-1998
*NODE, NSET=Nall
      34,1.000000000000e+00,0.000000000000e+00,1.000000000000e+00
      35,1.000000000000e+00,0.000000000000e+00,1.500000000000e+00
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*ELEMENT, TYPE=C3D20R, ELSET=Eall
     5,    61,   105,   222,   192,    59,   109,   228,   196,   104,   220,
         221,   193,   108,   226,   227,   197,    60,   107,   225,   194
     6,   105,    34,   134,   222,   109,    36,   138,   228,   106,   133,
         223,   220,   110,   137,   229,   226,   107,    35,   136,   225
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** Names based on dd
*NSET,NSET=Nsurface
34,
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*MATERIAL,NAME=EL
*ELASTIC
  210000.0,        .3
*DENSITY
7.8E-9
*SOLID SECTION,MATERIAL=EL,ELSET=Eall
*SUBMODEL,TYPE=NODE,INPUT=beamf.frd
Nall
*STEP
*STATIC
*BOUNDARY,SUBMODEL,DATA SET=9
Nsurface,1,3
*NODE FILE
U
*END STEP
