**
**   Structure: cantilever beam.
**   Test objective: hyperfoam material (N=2) under tension.
**
*HEADING
Model: beam     Date: 10-Mar-1998
*NODE
     1,      0.000000,      0.000000,      0.000000
     2,      1.000000,      0.000000,      0.000000
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*ELEMENT, TYPE=C3D20R   , ELSET=B1
     1,     1,    10,    95,    19,    61,   105,   222,   192,     9,    93,
           94,    20,   104,   220,   221,   193,    62,   103,   219,   190
     2,    10,     2,    13,    95,   105,    34,   134,   222,    11,    12,
           96,    93,   106,   133,   223,   220,   103,    33,   132,   219
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*NSET, NSET=CN7
    97,    96,    95,    94,    93,    20
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*BOUNDARY
CN7,3,3
1,1,2
2,2,2
*ELSET,ELSET=EALL,GENERATE
1,32
*NSET,NSET=NALL,GENERATE
1,261
*MATERIAL,NAME=HY
*HYPERFOAM,N=2
0.164861,8.88413,2.302e-5,-4.81798,0.,0.
*SOLID SECTION,ELSET=EALL,MATERIAL=HY
*NSET,NSET=LAST
5,6,7,8,22,25,28,31,100
*NSET,NSET=GIBO
5,
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*NSET,NSET=N1
100
*NSET,NSET=N2
22,25,28,31
*NSET,NSET=N3
5,6,7,8
*NSET,NSET=N4
21,23,24,26,27,29,30,32
*NSET,NSET=N5
98,99,101,102
*STEP,NLGEOM,INC=100
*STATIC
1.,1.
*CLOAD
N1,3,-0.000833333
N2,3,-0.000416666
N3,3,-0.000208333
N4,3,0.000833333
N5,3,0.001666666
*NODE PRINT,NSET=NALL
U
*EL PRINT,ELSET=EALL
S
*END STEP
