**
**   Structure: cantilever beam under shear forces.
**   Test objective: MPC's in geometrically nonlinear calculations.
**
*HEADING
Model: beam     Date: 10-Mar-1998
*NODE
     1,      0.000000,      0.000000,      0.000000
     2,      1.000000,      0.000000,      0.000000
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*ELEMENT, TYPE=C3D20R   , ELSET=B1
     1,     1,    10,    95,    19,    61,   105,   222,   192,     9,    93,
           94,    20,   104,   220,   221,   193,    62,   103,   219,   190
     2,    10,     2,    13,    95,   105,    34,   134,   222,    11,    12,
           96,    93,   106,   133,   223,   220,   103,    33,   132,   219
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*NSET, NSET=CN7
    97,    96,    95,    94,    93,    20
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*BOUNDARY
CN7, 1
*BOUNDARY
CN7, 2
*BOUNDARY
CN7, 3
*EQUATION
2
5,3,-1.,28,3,1.
2
6,3,-1.,28,3,1.
2
7,3,-1.,28,3,1.
2
8,3,-1.,28,3,1.
2
21,3,-1.,28,3,1.
2
22,3,-1.,28,3,1.
2
23,3,-1.,28,3,1.
2
24,3,-1.,28,3,1.
2
25,3,-1.,28,3,1.
2
26,3,-1.,28,3,1.
2
27,3,-1.,28,3,1.
2
29,3,-1.,28,3,1.
2
30,3,-1.,28,3,1.
2
31,3,-1.,28,3,1.
2
32,3,-1.,28,3,1.
2
98,3,-1.,28,3,1.
2
99,3,-1.,28,3,1.
2
100,3,-1.,28,3,1.
2
101,3,-1.,28,3,1.
2
102,3,-1.,28,3,1.
*NSET,NSET=NALL,GENERATE
1,261
*ELSET,ELSET=EALL,GENERATE
1,32
*MATERIAL,NAME=EL
*ELASTIC
  210000.0 ,       .3
*DENSITY
7.8E-9
*SOLID SECTION,ELSET=EALL,MATERIAL=EL
*NSET,NSET=LAST
5,6,7,8,22,25,28,31,100
*STEP,NLGEOM
*STATIC
1.,1.
*CLOAD
LAST,2,5.
*NODE PRINT,NSET=NALL
U
*EL PRINT,ELSET=EALL
S
*END STEP
