**
**   Structure: cantilever beam.
**   Test objective: change of eigenfrequencies due to
**                   contact between two beam segments
**                   large displacement stiffness +
**                   stress stiffness +
**                   contact spring stiffness (with friction)
**
*NODE, NSET=Nall
       1,0.000000000000e+00,0.000000000000e+00,4.000000000000e+00
       2,5.000000000000e-01,0.000000000000e+00,4.000000000000e+00
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*ELEMENT, TYPE=C3D20R, ELSET=Eall
     1,     1,     2,     3,     4,     5,     6,     7,     8,     9,    10,
          11,    12,    17,    18,    19,    20,    13,    14,    15,    16
     2,     4,     3,    21,    22,     8,     7,    23,    24,    11,    25,
          26,    27,    19,    30,    31,    32,    16,    15,    28,    29
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*SURFACE,NAME=indf
20, S5
28, S5
24, S5
32, S5
*SURFACE,NAME=depf
1, S3
9, S3
5, S3
13, S3
*NSET,NSET=dep
1,
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*SURFACE,NAME=Ndep,TYPE=NODE
dep
*NSET,NSET=LOAD
142,
143,
146,
147,
198,
199,
231,
233,
264,
*NSET,NSET=FIX
45,
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*NSET,NSET=fix2
142,
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*BOUNDARY
FIX, 1
fix2,1
*BOUNDARY
FIX, 2
fix2,2
*BOUNDARY
FIX, 3
fix2,3
*MATERIAL,NAME=EL
*ELASTIC
  210000.0,        .3
*DENSITY
7.8E-9
*SOLID SECTION,ELSET=Eall,MATERIAL=EL
*CONTACT PAIR,INTERACTION=SI1,TYPE=SURFACE TO SURFACE
depf,indf
*SURFACE INTERACTION,NAME=SI1
*SURFACE BEHAVIOR,PRESSURE-OVERCLOSURE=LINEAR
1.e7,3.
*FRICTION
0.2,1.E5
*STEP,NLGEOM
*STATIC
*CONTROLS,PARAMETERS=LINE SEARCH
,1.,1.,
*BOUNDARY
fix2,3,3,-0.05
*END STEP
*STEP,PERTURBATION
*FREQUENCY
10
*END STEP
