**
**   Structure: heated cantilever beam.
**   Test objective: 2 different materials.
**
*HEADING
Model: beam     Date: 10-Mar-1998
*NODE
     1,      0.000000,      0.000000,      0.000000
     2,      1.000000,      0.000000,      0.000000
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*ELEMENT, TYPE=C3D20R   , ELSET=B1
     1,     1,    10,    95,    19,    61,   105,   222,   192,     9,    93,
           94,    20,   104,   220,   221,   193,    62,   103,   219,   190
     2,    10,     2,    13,    95,   105,    34,   134,   222,    11,    12,
           96,    93,   106,   133,   223,   220,   103,    33,   132,   219
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*NSET,NSET=FIX
1,2,3,4,9,10
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*ELSET,ELSET=E1
1,3,5,7,9,11,13,15,17,19,21,23,25,27,29,31
*ELSET,ELSET=E2
2,4,6,8,10,12,14,16,18,20,22,24,26,28,30,32
*BOUNDARY
FIX,1,3
*NSET,NSET=NALL,GENERATE
1,261
*ELSET,ELSET=EALL,GENERATE
1,32
*INITIAL CONDITIONS,TYPE=TEMPERATURE
NALL,293.
*MATERIAL,NAME=EL1
*ELASTIC
  210000.0,        .3
*DENSITY
7.8E-9
*EXPANSION,ZERO=293.
1.E-6
*MATERIAL,NAME=EL2
*ELASTIC
  210000.0,        .3
*DENSITY
7.8E-9
*EXPANSION,ZERO=293.
2.E-6
*SOLID SECTION,ELSET=E1,MATERIAL=EL1
*SOLID SECTION,ELSET=E2,MATERIAL=EL2
*STEP
*STATIC
*TEMPERATURE
NALL,500.
*NODE PRINT,NSET=NALL
U
*EL PRINT,ELSET=EALL
S
*END STEP
