**
**   Structure: cantilever beam.
**   Test objective: transfer of temperatures in a *STATIC
**                   step to a *COMBINED TEMPERATURE-
**                   DISPLACEMENT step
**
*HEADING
Model: beam     Date: 10-Mar-1998
*NODE
     1,      0.000000,      0.000000,      0.000000
     2,      1.000000,      0.000000,      0.000000
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*ELEMENT, TYPE=C3D20R   , ELSET=Eall
     1,     1,    10,    95,    19,    61,   105,   222,   192,     9,    93,
           94,    20,   104,   220,   221,   193,    62,   103,   219,   190
     2,    10,     2,    13,    95,   105,    34,   134,   222,    11,    12,
           96,    93,   106,   133,   223,   220,   103,    33,   132,   219
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*NSET, NSET=FIX
    97,    96,    95,    94,    93,    20
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*BOUNDARY
2,1,3
1,2,3
FIX, 3
*NSET,NSET=Nall,GENERATE
1,261
*MATERIAL,NAME=EL
*ELASTIC
210000.,.3
*DENSITY
7.8E-9
*EXPANSION
12.E-6
*CONDUCTIVITY
50.,0.
*SPECIFIC HEAT
1.
*PHYSICAL CONSTANTS,ABSOLUTE ZERO=-273.15,STEFAN BOLTZMANN=5.669E-8
*SOLID SECTION,ELSET=Eall,MATERIAL=EL
*NSET,NSET=LOAD
5,6,7,8,22,25,28,31,100
*INITIAL CONDITIONS,TYPE=TEMPERATURE
Nall,1000.
*STEP
*STATIC
*TEMPERATURE
Nall,0.
*NODE PRINT,NSET=Nall
U,NT
*EL PRINT,ELSET=Eall
S
*END STEP
*STEP,NLGEOM
*COUPLED TEMPERATURE-DISPLACEMENT,STEADY STATE
.5,1.
*BOUNDARY
1,11,11,1000.
*NODE PRINT,NSET=Nall
U,NT
*EL PRINT,ELSET=Eall
S
*END STEP
