**
**   Structure: hinged beam.
**   Test objective: umat routine.
**
*HEADING
Model: beam     Date: 10-Mar-1998
*NODE
     1,      0.000000,      0.000000,      0.000000
     2,      1.000000,      0.000000,      0.000000
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*ELEMENT, TYPE=C3D20R   , ELSET=Eall
     1,     1,    10,    95,    19,    61,   105,   222,   192,     9,    93,
           94,    20,   104,   220,   221,   193,    62,   103,   219,   190
     2,    10,     2,    13,    95,   105,    34,   134,   222,    11,    12,
           96,    93,   106,   133,   223,   220,   103,    33,   132,   219
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*NSET, NSET=FIX
    97,    96,    95,    94,    93,    20
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*NSET,NSET=Nfix2
5,
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*NSET,NSET=Nhl
13,
19,
94,
95,
96,
*NSET,NSET=Nhr
25,
31,
99,
100,
101,
*BOUNDARY
Nhl,1,3
Nhr,1,3
*NSET,NSET=Nall,GENERATE
1,261
*MATERIAL,NAME=LIN_ISO_EL
*USER MATERIAL,CONSTANTS=2
  210000.0,        .3
*SOLID SECTION,ELSET=Eall,MATERIAL=LIN_ISO_EL
*NSET,NSET=Nload
70,
85,
174,
175,
176,
*STEP,NLGEOM
*STATIC
*CLOAD
Nload,2,1.
*NODE PRINT,NSET=Nall
U
*EL PRINT,ELSET=Eall
S
*END STEP
