**
**   Structure: channel connecting two reservoirs.
**   Test objective: mild slope followed by steep slope
**
*NODE, NSET=Nall
       1,-1.000000000000e-01,0.000000000000e+00,0.000000000000e+00
       2,0.000000000000e+00,0.000000000000e+00,0.000000000000e+00
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*ELEMENT, TYPE=D, ELSET=Eall
     1,      1,3,2
     2,      2,      5,      4
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*MATERIAL,NAME=WATER
*DENSITY
1000.
*FLUID CONSTANTS
4217.,1750.E-6,273.
*ELSET,ELSET=E1
26,27
*ELSET,ELSET=E2
1
*ELSET,ELSET=E3
2
*ELSET,ELSET=E4
3,4,5,6,7,8,9,10,11,12
*ELSET,ELSET=E5
13
*ELSET,ELSET=E6
14
*ELSET,ELSET=E7
15,16,17,18,19,20,21,22,23,24
*ELSET,ELSET=E8
25
*FLUID SECTION,ELSET=E1,TYPE=CHANNEL INOUT,MATERIAL=WATER
*FLUID SECTION,ELSET=E2,TYPE=CHANNEL SLUICE GATE,MANNING,MATERIAL=WATER
12.,0.0009,0.95,,2
*FLUID SECTION,ELSET=E3,TYPE=CHANNEL SLUICE OPENING,MANNING,MATERIAL=WATER
12.,0.0009,-0.1,0.,0.02,1
*FLUID SECTION,ELSET=E4,TYPE=CHANNEL STRAIGHT,MANNING,MATERIAL=WATER
12.,0.0009,-29.8,0.,0.02,1
*FLUID SECTION,ELSET=E5,TYPE=CHANNEL DISCONTINUOUS SLOPE,MANNING,MATERIAL=WATER
12.,0.0009,-0.1,0.,0.02,1,,14
,
*FLUID SECTION,ELSET=E6,TYPE=CHANNEL DISCONTINUOUS OPENING,MANNING,MATERIAL=WATER
12.,0.009,-0.1,0.,0.02,13
*FLUID SECTION,ELSET=E7,TYPE=CHANNEL STRAIGHT,MANNING,MATERIAL=WATER
12.,0.009,-29.8,0.,0.02,13
*FLUID SECTION,ELSET=E8,TYPE=CHANNEL RESERVOIR,MANNING,MATERIAL=WATER
12.,0.009,-0.1,0.,0.02,13
*BOUNDARY
50,2,2,1.6
*BOUNDARY,MASS FLOW
55,1,1,50000.
*STEP
*HEAT TRANSFER,STEADY STATE
*DLOAD
EALL,GRAV,9.81,0.,0.,-1.
*NODE PRINT,NSET=NALL
U
*END STEP
