**
**   Structure: 2d Couette incompressible concentric fluid flow
**              4 layers in circumferential direction
**   Test objective: CFD Finite Volume Method with cyclic symmetry
**                   inner wall: tangential velocity 2, temperature 1.
**                   outer wall: tangential velocity 1, temperature 1.
**                   viscous stress and heat flux output in a
**                   local cylindrical system
**   Analytical solution: v proportional to 1/r
**                        T (r=0.75) = 1.467
**                        p difference inner/outer wall = 1.5
**
*NODE, NSET=Nall
       1,-1.000000000000e+00,0.000000000000e+00,0.000000000000e+00
       2,-9.807852804032e-01,1.950903220161e-01,0.000000000000e+00
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*ELEMENT, TYPE=F3D8, ELSET=Eall
     1,     1,     2,     3,     4,     5,     6,     7,     8
     2,     5,     6,     7,     8,     9,    10,    11,    12
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*SURFACE, NAME=SOLIDSURFACE
1, S1
5, S1
4, S2
8, S2
9, S1
12, S2
13, S1
16, S2
*TRANSFORMF,TYPE=C,SURFACE=SOLIDSURFACE
0.,0.,0.,0.,0.,1.
*MATERIAL,NAME=WATER
*DENSITY
1.
*FLUID CONSTANTS
1.,1.
*CONDUCTIVITY
1.
*SOLID SECTION,ELSET=Eall,MATERIAL=WATER
*INITIAL CONDITIONS,TYPE=PRESSURE
Nall,1.
*INITIAL CONDITIONS,TYPE=FLUID VELOCITY
Nall,1,0.
Nall,2,0.
Nall,3,0.
*INITIAL CONDITIONS,TYPE=TEMPERATURE
Nall,1.
** Surfaces based on mast
*SURFACE, NAME=Smast
1, S6
2, S6
3, S6
4, S6
** Surfaces based on slav
*SURFACE, NAME=Sslav
13, S4
14, S4
15, S4
16, S4
*TIE,FLUIDCYCLIC,NAME=T1
Sslav,Smast
*CYCLIC SYMMETRY MODEL,TIE=T1,N=8
0.,0.,0.,0.,0.,1.
*STEP,INCF=200
*CFD,STEADY STATE
*BOUNDARYF
4, S2, 1,, 0.000000
4, S2, 2,, 2.000000
4, S2, 3,, 0.000000
4, S2, 11,, 1.000000
8, S2, 1,, 0.000000
8, S2, 2,, 2.000000
8, S2, 3,, 0.000000
8, S2, 11,, 1.000000
12, S2, 1,, 0.000000
12, S2, 2,, 2.000000
12, S2, 3,, 0.000000
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13, S1, 11,, 1.000000
*DFLUX
1, S3, 0.000000e+00
5, S3, 0.000000e+00
1, S5, 0.000000e+00
5, S5, 0.000000e+00
2, S3, 0.000000e+00
6, S3, 0.000000e+00
2, S5, 0.000000e+00
6, S5, 0.000000e+00
3, S3, 0.000000e+00
7, S3, 0.000000e+00
3, S5, 0.000000e+00
7, S5, 0.000000e+00
4, S3, 0.000000e+00
8, S3, 0.000000e+00
4, S5, 0.000000e+00
8, S5, 0.000000e+00
9, S3, 0.000000e+00
9, S5, 0.000000e+00
10, S3, 0.000000e+00
10, S5, 0.000000e+00
11, S3, 0.000000e+00
11, S5, 0.000000e+00
12, S3, 0.000000e+00
12, S5, 0.000000e+00
13, S3, 0.000000e+00
13, S5, 0.000000e+00
14, S3, 0.000000e+00
14, S5, 0.000000e+00
15, S3, 0.000000e+00
15, S5, 0.000000e+00
16, S3, 0.000000e+00
16, S5, 0.000000e+00
*MASS FLOW
1, M3, 0.000000e+00
5, M3, 0.000000e+00
1, M5, 0.000000e+00
5, M5, 0.000000e+00
2, M3, 0.000000e+00
6, M3, 0.000000e+00
2, M5, 0.000000e+00
6, M5, 0.000000e+00
3, M3, 0.000000e+00
7, M3, 0.000000e+00
3, M5, 0.000000e+00
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16, M5, 0.000000e+00
*NODE FILE,FREQUENCYF=200
VF,PSF,TSF
*END STEP
