**
**   Structure: Couette flow, steady state, compressible
**   Test objective: restart capability (writing part).
**
*NODE, NSET=Nall
       1,0.000000000000e+00,1.000000000000e+00,1.000000000000e-01
       2,0.000000000000e+00,1.000000000000e+00,0.000000000000e+00
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*ELEMENT, TYPE=F3D8, ELSET=Eall
     1,     1,     2,     3,     4,     5,     6,     7,     8
     2,     4,     3,     9,    10,     8,     7,    11,    12
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** Surfaces based on left
*SURFACE, NAME=Sleft
19, S2
20, S2
39, S2
40, S2
59, S2
60, S2
79, S2
80, S2
99, S2
100, S2
119, S2
120, S2
** Surfaces based on right
*SURFACE, NAME=Sright
1, S1
2, S1
21, S1
22, S1
41, S1
42, S1
61, S1
62, S1
81, S1
82, S1
101, S1
102, S1
** Surfaces based on in
*SURFACE, NAME=Sin
1, S3
3, S3
5, S3
7, S3
9, S3
11, S3
13, S3
15, S3
17, S3
19, S3
** Surfaces based on out
*SURFACE, NAME=Sout
102, S5
104, S5
106, S5
108, S5
110, S5
112, S5
114, S5
116, S5
118, S5
120, S5
** Surfaces based on sliding
*SURFACE, NAME=Ssliding
1, S6
1, S4
2, S4
2, S6
3, S6
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120, S6
*MATERIAL,NAME=AIR
*FLUID CONSTANTS
1.,1.
*SPECIFIC GAS CONSTANT
0.285714286
*CONDUCTIVITY
1.
*SOLID SECTION,ELSET=Eall,MATERIAL=AIR
*INITIAL CONDITIONS,TYPE=FLUID VELOCITY
       1,1,1.000000000000e+00
       2,1,1.000000000000e+00
       3,1,1.000000000000e+00
       4,1,1.000000000000e+00
       5,1,9.000000000000e-01
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Nall,3,0.
*INITIAL CONDITIONS,TYPE=PRESSURE
Nall,1.
*INITIAL CONDITIONS,TYPE=TEMPERATURE
Nall,1.
*STEP,INCF=2
*CFD,STEADY STATE,COMPRESSIBLE
1.,1.,,,0.01
*RESTART,WRITE
*BOUNDARYF
Sright,S,1,,1.
Sright,S,2,3,0.
Sright,S,11,,1.
Sleft,S,1,3,0.
Sleft,S,11,,1.
Sin,S,2,3,0.
Sin,S,8,,1.
1,S3,1,,0.95
3,S3,1,,0.85
5,S3,1,,0.75
7,S3,1,,0.65
9,S3,1,,0.55
11,S3,1,,0.45
13,S3,1,,0.35
15,S3,1,,0.25
17,S3,1,,0.15
19,S3,1,,0.05
1,S3,11,,1.025
3,S3,11,,1.065
5,S3,11,,1.095
7,S3,11,,1.115
9,S3,11,,1.125
11,S3,11,,1.125
13,S3,11,,1.115
15,S3,11,,1.095
17,S3,11,,1.065
19,S3,11,,1.025
*MASSFLOW
Ssliding,M,0.
*NODE FILE,FREQUENCYF=1
VF,PSF,TSF
*END STEP
