**
**   Structure: two cantilever beams.
**   Test objective: gap element.
**
*NODE, NSET=Nall
       1,  1.00000e+00,  1.00000e+00, -5.96046e-08
       2,  1.00000e+00,  5.00000e-01, -5.96046e-08
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*ELEMENT, TYPE=C3D20, ELSET=Eall
     1,     1,     2,     3,     4,     5,     6,     7,     8,     9,    10,
          11,    12,    17,    18,    19,    20,    13,    14,    15,    16
     2,     2,    21,    22,     3,     6,    23,    24,     7,    25,    26,
          27,    10,    30,    31,    32,    18,    14,    28,    29,    15
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*ELEMENT, TYPE=GAPUNI, ELSET=G1
65,235,506
*NSET,NSET=N1
235,506
*NSET,NSET=Nfix
1,
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*BOUNDARY
Nfix,1,3
*MATERIAL,NAME=EL
*ELASTIC
210000.,.3
*SOLID SECTION,ELSET=Eall,MATERIAL=EL
*SOLID SECTION,ELSET=G1,MATERIAL=EL
*GAP,ELSET=G1
0.5,0.,1.,0.
**
*STEP,NLGEOM,INC=100
*STATIC,DIRECT
.05,1.
*CLOAD
496,2,-100.
*NODE PRINT,NSET=N1
U
*END STEP
**
*STEP,NLGEOM,INC=100
*STATIC,DIRECT
.05,1.
*CLOAD,OP=NEW
*NODE PRINT,NSET=N1
U
S
*END STEP
