**
**   Structure: cantilever beam.
**   Test objective: residual compressive stresses
**
*HEADING
Model: beam     Date: 10-Mar-1998
*NODE
     1,      0.000000,      0.000000,      0.000000
     2,      1.000000,      0.000000,      0.000000
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*ELEMENT, TYPE=C3D20R   , ELSET=Eall
     1,     1,    10,    95,    19,    61,   105,   222,   192,     9,    93,
           94,    20,   104,   220,   221,   193,    62,   103,   219,   190
     2,    10,     2,    13,    95,   105,    34,   134,   222,    11,    12,
           96,    93,   106,   133,   223,   220,   103,    33,   132,   219
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*NSET, NSET=FIX
    97,    96,    95,    94,    93,    20
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*BOUNDARY
FIX, 1
*BOUNDARY
FIX, 2
*BOUNDARY
FIX, 3
*NSET,NSET=Nall,GENERATE
1,261
*MATERIAL,NAME=EL
*ELASTIC
  210000.0,        .3
*SOLID SECTION,ELSET=Eall,MATERIAL=EL
*NSET,NSET=LOAD
5,6,7,8,22,25,28,31,100
*INITIAL CONDITIONS,TYPE=STRESS
29,1,-100.,-100.,-100.,0.,0.,0.
29,2,-100.,-100.,-100.,0.,0.,0.
29,3,-100.,-100.,-100.,0.,0.,0.
29,4,-100.,-100.,-100.,0.,0.,0.
29,5,-100.,-100.,-100.,0.,0.,0.
29,6,-100.,-100.,-100.,0.,0.,0.
29,7,-100.,-100.,-100.,0.,0.,0.
29,8,-100.,-100.,-100.,0.,0.,0.
30,1,-100.,-100.,-100.,0.,0.,0.
30,2,-100.,-100.,-100.,0.,0.,0.
30,3,-100.,-100.,-100.,0.,0.,0.
30,4,-100.,-100.,-100.,0.,0.,0.
30,5,-100.,-100.,-100.,0.,0.,0.
30,6,-100.,-100.,-100.,0.,0.,0.
30,7,-100.,-100.,-100.,0.,0.,0.
30,8,-100.,-100.,-100.,0.,0.,0.
31,1,-100.,-100.,-100.,0.,0.,0.
31,2,-100.,-100.,-100.,0.,0.,0.
31,3,-100.,-100.,-100.,0.,0.,0.
31,4,-100.,-100.,-100.,0.,0.,0.
31,5,-100.,-100.,-100.,0.,0.,0.
31,6,-100.,-100.,-100.,0.,0.,0.
31,7,-100.,-100.,-100.,0.,0.,0.
31,8,-100.,-100.,-100.,0.,0.,0.
32,1,-100.,-100.,-100.,0.,0.,0.
32,2,-100.,-100.,-100.,0.,0.,0.
32,3,-100.,-100.,-100.,0.,0.,0.
32,4,-100.,-100.,-100.,0.,0.,0.
32,5,-100.,-100.,-100.,0.,0.,0.
32,6,-100.,-100.,-100.,0.,0.,0.
32,7,-100.,-100.,-100.,0.,0.,0.
32,8,-100.,-100.,-100.,0.,0.,0.
*STEP
*STATIC
*NODE PRINT,NSET=Nall
U
*EL PRINT,ELSET=Eall
S
*END STEP
