**
**   Structure: bolt under pre-tension
**   Test objective: contact, pre-tension
**
*NODE,nset=Nall
         1,  11.253         ,  9.5            ,  0.0
         2,  11.253         ,  10.025         ,  0.0
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*ELEMENT,TYPE=CAX8,ELSET=BOLT
      1942,      6243,      6241,      6261,      6277,      6242,      6262,      6278,
      6280
      1941,      6189,      6243,      6277,      6191,      6244,      6280,      6276,
      6190
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*ELEMENT,TYPE=CAX8,ELSET=FLA
         1,         1,         3,        35,        33,         2,        23,        34,
        22
         2,         3,         5,        37,        35,         4,        24,        36,
        23
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*ELEMENT,TYPE=CAX8,ELSET=NUT
      1943,      6334,      6339,      6344,      6332,      6338,      6343,      6346,
      6333
      1944,      6332,      6344,      6323,      6325,      6346,      6345,      6324,
      6331
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*ELSET, ELSET=FL_u
       321,       331,       341,       351,       361,       371,       381,       391,
       401,       411,       421
*ELSET, ELSET=FL_l
        10,        20,        30,        40,        50,        60,        70,        80,
        90,       100,       110
*ELSET, ELSET=NUT_fl1
      1951,      1952,      1963,      1964
*ELSET, ELSET=NUT_fl
      1949,      1961
*ELSET, ELSET=BOLT_fl1
      2347,
*ELSET, ELSET=BOLT_fl
      2317,      2319,      2323,      2325,      2341,      2343,      2350,      2352
*ELSET, ELSET=FL_bolt
        61,        71,        81,        91,       101
*ELSET, ELSET=FL_nut
       330,       340,       350,       360,       370,       380
*ELSET, ELSET=BB
      2138,      2139,      2144,      2145,      2165,      2166,      2175,      2174,
*ELSET, ELSET=BB1
      2171
*MATERIAL, NAME=BOLT
*ELASTIC, TYPE = ISOTROPIC
    210000.0  ,0.3       ,0.0
*MATERIAL, NAME=FL
*ELASTIC, TYPE = ISOTROPIC
    210000.0  ,0.3       ,0.0
*SOLID SECTION, ELSET=BOLT, MATERIAL=BOLT
    1,
*SOLID SECTION, ELSET=FLA, MATERIAL=FL
    1.0,
*SOLID SECTION, ELSET=NUT, MATERIAL=BOLT
    1.,
*SURFACE, NAME = BB, TYPE = ELEMENT
    BB,S4
    BB1,S2
*SURFACE, NAME = FL_u, TYPE = ELEMENT
    FL_u,S4
*SURFACE, NAME = FL_NUT, TYPE = ELEMENT
    FL_nut,S2
*SURFACE, NAME = FL_bolt, TYPE = ELEMENT
    FL_bolt,S4
*SURFACE, NAME = BOLT_fl, TYPE = ELEMENT
    BOLT_fl1,S2
    BOLT_fl,S4
*SURFACE, NAME = NUT_fl, TYPE = ELEMENT
    NUT_fl1,S3
    NUT_fl,S1
*SURFACE, NAME = FL_l, TYPE = ELEMENT
    FL_l,S2
*PRE-TENSION SECTION, NODE=4608, SURFACE=BB
    0.,-1.,0.
*SURFACE INTERACTION, NAME=CC
*SURFACE BEHAVIOR,PRESSURE-OVERCLOSURE=LINEAR
 1.E6, 3.143748
*CONTACT PAIR, INTERACTION=CC, ADJUST=0.1,TYPE=SURFACE TO SURFACE
    FL_l, FL_u
*surface interaction, name=nut_fl
*SURFACE BEHAVIOR,PRESSURE-OVERCLOSURE=LINEAR
 1.E6, 3.143748
*CONTACT PAIR, INTERACTION= nut_fl, ADJUST=0.1,TYPE=SURFACE TO SURFACE
    NUT_fl, FL_NUT
*TIE, NAME = BOLT_FL, POSITION TOLERANCE = 0.1
    BOLT_fl, FL_bolt
*EQUATION
    4,
    6438,2,-1.73,5838,2,1.73,5838,1,-1.,6438,1,1.
    4,
    6447,2,-1.73,5836,2,1.73,5836,1,-1.,6447,1,1.
    4,
    6451,2,-1.73,5834,2,1.73,5834,1,-1.,6451,1,1.
    4,
    6448,2,-1.73,5832,2,1.73,5832,1,-1.,6448,1,1.
    4,
    6453,2,-1.73,5830,2,1.73,5830,1,-1.,6453,1,1.
    4,
    6452,2,-1.73,5828,2,1.73,5828,1,-1.,6452,1,1.
    4,
    6439,2,-1.73,5826,2,1.73,5826,1,-1.,6439,1,1.
*BOUNDARY
         1,2,,0.0
         3,2,,0.0
         5,2,,0.0
         7,2,,0.0
         9,2,,0.0
*step
*static
    0.999,1.
*cload
    4608, 1, 4000.
*contact print,set=Nall,frequency=10
    cdisp,cstress
*end step
