**
**   Structure: cantilever beam.
**   Test objective: frequency sensitivity w.r.t the geometry
**
*HEADING
Model: beam     Date: 10-Mar-1998
*NODE,NSET=Nall
     1,      0.000000,      0.000000,      0.000000
     2,      1.000000,      0.000000,      0.000000
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*ELEMENT, TYPE=C3D8  , ELSET=B1
     1,     1,    10,    95,    19,    61,   105,   222,   192,     9,    93,
     2,    10,     2,    13,    95,   105,    34,   134,   222,    11,    12,
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** Names based on trans
*NSET,NSET=Ntrans
36,
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*NSET, NSET=CN7
    97,    96,    95,    94,    93,    20
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*BOUNDARY
CN7, 1
*BOUNDARY
CN7, 2
*BOUNDARY
CN7, 3
*ELSET,ELSET=EALL,GENERATE
1,32
*MATERIAL,NAME=EL
*ELASTIC
  210000.0,        .3
*DENSITY
7.8E-9
*SOLID SECTION,MATERIAL=EL,ELSET=EALL
*DESIGNVARIABLES,TYPE=COORDINATE
Ntrans
*STEP
*FREQUENCY,STORAGE=YES
10
*END STEP
*STEP
*SENSITIVITY
*OBJECTIVE
EIGENFREQUENCY
*FILTER,TYPE=LINEAR,EDGE PRESERVATION=YES
2.,1.5
*NODE FILE
SEN
*END STEP
