**
**   Structure: disk.
**   Test objective: CAX6 elements
**
*NODE, NSET=Nall
       1,  0.00000e+00   ,  1.00000e+00,0.00000e+00
       2,  0.00000e+00   ,  5.00000e-01,0.00000e+00
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*ELEMENT, TYPE=CAX6, ELSET=Eall
     1,      1,      2,      3,      4,      5,      6
     2,      3,      2,      7,      5,      8,      9
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*BOUNDARY
52,1,2
1,1,1
*MATERIAL,NAME=EL
*ELASTIC
210000.,.3
*SOLID SECTION,ELSET=Eall,MATERIAL=EL
0.01
**
*STEP,NLGEOM
*STATIC
*CLOAD
83,2,1.
*NODE PRINT,NSET=Nall
U
*EL PRINT,ELSET=Eall
S
*END STEP
