**
**   Structure: cylindrical shell
**   Test objective: cavity radiation for axisymmetric elements
**
*NODE, NSET=Nall
       1,  1.05000e+00,  0.00000e+00,  0.00000e+00
       2,  1.05000e+00,  3.00000e-01,  0.00000e+00
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*ELEMENT, TYPE=CAX8, ELSET=Eall
     1,      1,      2,      3,      4,      5,      6,      7,      8
     2,      2,      9,     10,      3,     11,     12,     13,      6
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*NSET,NSET=Nfix1
25,
30,
33,
35,
38,
40,
43,
45,
48,
50,
53,
*NSET,NSET=Nfix2
3,
4,
7,
10,
13,
15,
18,
20,
23,
28,
*PHYSICAL CONSTANTS,ABSOLUTE ZERO=0.,STEFAN BOLTZMANN=5.669E-8
*MATERIAL,NAME=EL
*DENSITY
7800.
*CONDUCTIVITY
.05,0.
*SPECIFIC HEAT
446.
*SOLID SECTION,ELSET=Eall,MATERIAL=EL
0.17453
*INITIAL CONDITIONS,TYPE=TEMPERATURE
Nfix1,1000.
Nfix2,500.
**
*STEP,INC=100
*HEAT TRANSFER
.1,1000.
*RADIATE
Eall,R3CR,300.,.8
*EL PRINT,ELSET=Eall,FREQUENCY=10
HFL
*END STEP
