**
**   Structure: heated beam fixed in between two walls.
**   Test objective: element type C3D20.
**
*HEADING
Model: beam     Date: 10-Mar-1998
*NODE
     1,      0.000000,      0.000000,      0.000000
     2,      1.000000,      0.000000,      0.000000
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*ELEMENT, TYPE=C3D20   , ELSET=B1
     1,     1,    10,    95,    19,    61,   105,   222,   192,     9,    93,
           94,    20,   104,   220,   221,   193,    62,   103,   219,   190
     2,    10,     2,    13,    95,   105,    34,   134,   222,    11,    12,
           96,    93,   106,   133,   223,   220,   103,    33,   132,   219
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*NSET, NSET=CN7
    97,    96,    95,    94,    93,    20
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*ELSET,ELSET=EALL,GENERATE
1,32
*NSET,NSET=NALL,GENERATE
1,261
*MATERIAL,NAME=EL
*ELASTIC
270000.,.3,-1300.
210000.,.3,-100.
150000.,.3,1100.
90000.,.3,2300.
*EXPANSION
4.E-6,-1300.
12.E-6,-100.
20.E-6,1100.
28.E-6,2300.
*SOLID SECTION,ELSET=EALL,MATERIAL=EL
*NSET,NSET=LAST
5,6,7,8,22,25,28,31,100
*NSET,NSET=GIBO
5,
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*BOUNDARY
CN7,3,3
1,1,2
2,2,2
GIBO,3,3
*INITIAL CONDITIONS,TYPE=TEMPERATURE
NALL,0.
*NSET,NSET=Nnt500
40,
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*NSET,NSET=Nnt750
39,
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*NSET,NSET=Nnt1000
1,
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*STEP
*STATIC
*TEMPERATURE
Nnt500,500.
Nnt750,0.
Nnt1000,1000.
*NODE PRINT,NSET=NALL
U
*EL PRINT,ELSET=EALL
S,ENER,ELSE
*END STEP
