**
**   Structure: Cantilever beam under tensile forces
**   Test objective: Material card *CREEP with
**                   LAW=USER for an anisotropic
**                   material
**
*HEADING
Model: beam     Date: 10-Mar-1998
*NODE
     1,      0.000000,      0.000000,      0.000000
     2,      1.000000,      0.000000,      0.000000
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*ELEMENT, TYPE=C3D20R   , ELSET=B1
     1,     1,    10,    95,    19,    61,   105,   222,   192,     9,    93,
           94,    20,   104,   220,   221,   193,    62,   103,   219,   190
     2,    10,     2,    13,    95,   105,    34,   134,   222,    11,    12,
           96,    93,   106,   133,   223,   220,   103,    33,   132,   219
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*NSET, NSET=CN7
    97,    96,    95,    94,    93,    20
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*BOUNDARY
CN7,3,3
1,1,2
2,2,2
*ELSET,ELSET=EALL,GENERATE
1,32
*NSET,NSET=NALL,GENERATE
1,261
*MATERIAL,NAME=ANISO_CREEP
*USER MATERIAL,CONSTANTS=9
282692.3,121153.8,282692.3,121153.8,121153.8,282692.3,80769.,80769.,
80769.
*DEPVAR
7
*SOLID SECTION,ELSET=EALL,MATERIAL=ANISO_CREEP
*NSET,NSET=LAST
5,6,7,8,22,25,28,31,100
*NSET,NSET=GIBO
5,
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*NSET,NSET=N1
100
*NSET,NSET=N2
22,25,28,31
*NSET,NSET=N3
5,6,7,8
*NSET,NSET=N4
21,23,24,26,27,29,30,32
*NSET,NSET=N5
98,99,101,102
*AMPLITUDE,NAME=A1
0.,0.103734,1.,0.103734
*INITIAL CONDITIONS,TYPE=TEMPERATURE
NALL,293.
*STEP,INC=1000
*VISCO,CETOL=1.
0.001,0.001
*CLOAD,AMPLITUDE=A1
N1,3,-80.33333
N2,3,-40.16666
N3,3,-20.08333
N4,3,80.33333
N5,3,160.66666
*NODE PRINT,NSET=NALL
U
*EL PRINT,ELSET=EALL
SDV
*END STEP
