**
**   Structure: cantilever beam.
**   Test objective:  steady state dynamics; harmonic loading as
**                    special case of nonharmonic periodic loading;
**                    Rayleigh damping is active: alpha=5000.,
**                    beta=0.
**
*HEADING
Model: beam     Date: 10-Mar-1998
*NODE
     1,      0.000000,      0.000000,      0.000000
     2,      1.000000,      0.000000,      0.000000
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*ELEMENT, TYPE=C3D20R   , ELSET=B1
     1,     1,    10,    95,    19,    61,   105,   222,   192,     9,    93,
           94,    20,   104,   220,   221,   193,    62,   103,   219,   190
     2,    10,     2,    13,    95,   105,    34,   134,   222,    11,    12,
           96,    93,   106,   133,   223,   220,   103,    33,   132,   219
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*NSET, NSET=CN7
    97,    96,    95,    94,    93,    20
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*BOUNDARY
CN7, 1
*BOUNDARY
CN7, 2
*BOUNDARY
CN7, 3
*ELSET,ELSET=EALL,GENERATE
1,32
*MATERIAL,NAME=EL
*ELASTIC
  210000.0 ,       .3
*DENSITY
7.8E-9
*SOLID SECTION,MATERIAL=EL,ELSET=EALL
*NSET,NSET=N1
100
*AMPLITUDE,NAME=A1
 0.0000E+00, 0.1000E+01,
 0.4167E-05, 0.9511E+00,
 0.8333E-05, 0.8090E+00,
 0.1250E-04, 0.5878E+00,
 0.1667E-04, 0.3090E+00,
 0.2083E-04, 0.6123E-16,
 0.2500E-04,-0.3090E+00,
 0.2917E-04,-0.5878E+00,
 0.3333E-04,-0.8090E+00,
 0.3750E-04,-0.9511E+00,
 0.4167E-04,-0.1000E+01,
 0.4583E-04,-0.9511E+00,
 0.5000E-04,-0.8090E+00,
 0.5417E-04,-0.5878E+00,
 0.5833E-04,-0.3090E+00,
 0.6250E-04,-0.1837E-15,
 0.6667E-04, 0.3090E+00,
 0.7083E-04, 0.5878E+00,
 0.7500E-04, 0.8090E+00,
 0.7917E-04, 0.9511E+00,
 0.8333E-04, 0.1000E+01,
*STEP
*FREQUENCY,SOLVER=ARPACK,STORAGE=YES
10,0.01
*END STEP
*STEP
*STEADY STATE DYNAMICS,HARMONIC=NO
12000.,12000.,1,1.,20,0.,0.8333E-4
*MODAL DAMPING,RAYLEIGH
,,5000.,0.
*BOUNDARY,AMPLITUDE=A1
CN7,1,1,1.
*NODE PRINT,NSET=N1
U
*END STEP
