**
**   Structure: cantilever beam.
**   Test objective: static load followed by dynamic load
**
*HEADING
Model: beam     Date: 10-Mar-1998
*NODE
     1,      0.000000,      0.000000,      0.000000
     2,      1.000000,      0.000000,      0.000000
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*ELEMENT, TYPE=C3D20R   , ELSET=Eall
     1,     1,    10,    95,    19,    61,   105,   222,   192,     9,    93,
           94,    20,   104,   220,   221,   193,    62,   103,   219,   190
     2,    10,     2,    13,    95,   105,    34,   134,   222,    11,    12,
           96,    93,   106,   133,   223,   220,   103,    33,   132,   219
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*NSET, NSET=FIX
    97,    96,    95,    94,    93,    20
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*BOUNDARY
FIX, 1
*BOUNDARY
FIX, 2
*BOUNDARY
FIX, 3
*NSET,NSET=Nall,GENERATE
1,261
*MATERIAL,NAME=EL
*ELASTIC
  210000.0,        .3
*DENSITY
7.8E-9
*SOLID SECTION,ELSET=Eall,MATERIAL=EL
*NSET,NSET=LOAD
5,6,7,8,22,25,28,31,100
*NSET,NSET=N1
100
*STEP,NLGEOM
*STATIC
1.E-6,1.E-6
*CLOAD
LOAD,2,1.
*NODE PRINT,NSET=N1
U
*EL PRINT,ELSET=EALL,TOTALS=ONLY
ENER
*END STEP
*STEP,INC=2000
*DYNAMIC
1.E-6,1.E-5,,1.E-6
*CLOAD
LOAD,2,2.
*NODE PRINT,NSET=N1
U
*EL PRINT,ELSET=EALL,TOTALS=ONLY
ENER
*END STEP
