**
**   Structure: cantilever beam loaded by tensile forces.
**   Test objective: plasticity with isotropic hardening:
**                   heating effect
**                   *CONTROLS is IMPORTANT for the convergence
**
*HEADING
Model: beam     Date: 10-Mar-1998
*NODE
     1,      0.000000,      0.000000,      0.000000
     2,      1.000000,      0.000000,      0.000000
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*ELEMENT, TYPE=C3D20R   , ELSET=B1
     1,     1,    10,    95,    19,    61,   105,   222,   192,     9,    93,
           94,    20,   104,   220,   221,   193,    62,   103,   219,   190
     2,    10,     2,    13,    95,   105,    34,   134,   222,    11,    12,
           96,    93,   106,   133,   223,   220,   103,    33,   132,   219
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*NSET, NSET=CN7
    97,    96,    95,    94,    93,    20
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*BOUNDARY
CN7,3,3
1,1,2
2,2,2
*ELSET,ELSET=EALL,GENERATE
1,32
*NSET,NSET=NALL,GENERATE
1,261
*MATERIAL,NAME=HY
*ELASTIC
210000.,.3
*EXPANSION
25.E-6
*PLASTIC
800.,0.
1600.,.1
*DENSITY
7.8E-9
*SPECIFIC HEAT
446.E6
*CONDUCTIVITY
50.,0.
*SOLID SECTION,ELSET=EALL,MATERIAL=HY
*PHYSICAL CONSTANTS,ABSOLUTE ZERO=-273.15,STEFAN BOLTZMANN=5.669E-8
*NSET,NSET=LAST
5,6,7,8,22,25,28,31,100
*NSET,NSET=GIBO
5,
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*INITIAL CONDITIONS,TYPE=TEMPERATURE
Nall,0.
*STEP,NLGEOM
*COUPLED TEMPERATURE-DISPLACEMENT,STEADY STATE,DIRECT
.1,1.
*CONTROLS,PARAMETERS=TIME INCREMENTATION
6,16,9,32,20,4,,5,,,
0.25,0.5,0.75,,,,1.5,,
*DLOAD
29,P2,-1000.
30,P2,-1000.
31,P2,-1000.
32,P2,-1000.
*BOUNDARY
CN7,11,11,0.
*DFLUX
B1,BFNU
*NODE PRINT,NSET=NALL,FREQUENCY=100
NT
*END STEP
