**
**   Structure: three cantilever beams.
**   Test objective: parameter DELTMX
**
*NODE, NSET=Nall
       1,  2.00000e+00,  5.00000e-01, -5.96046e-08
       2,  1.50000e+00,  5.00000e-01, -5.96046e-08
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*ELEMENT, TYPE=C3D20, ELSET=Eall
     1,     1,     2,     3,     4,     5,     6,     7,     8,     9,    10,
          11,    12,    17,    18,    19,    20,    13,    14,    15,    16
     2,     2,    21,    22,     3,     6,    23,    24,     7,    25,    26,
          27,    10,    30,    31,    32,    18,    14,    28,    29,    15
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*NSET,NSET=Nup
5,
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*NSET,NSET=Ndo
166,
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*PHYSICAL CONSTANTS,ABSOLUTE ZERO=-273.15,STEFAN BOLTZMANN=5.669E-8
*MATERIAL,NAME=EL
*DENSITY
7.8E-9
*CONDUCTIVITY
50.,0.
*SPECIFIC HEAT
446.E6
*SOLID SECTION,ELSET=Eall,MATERIAL=EL
*INITIAL CONDITIONS,TYPE=TEMPERATURE
Nall,20.
*STEP,INC=100
*HEAT TRANSFER,DELTMX=50.
1.e-4,.01
*BOUNDARY
Nup,11,11,1000.
Ndo,11,11,20.
*RADIATE
1, R1CR,,1.
2, R1CR,,1.
3, R1CR,,1.
4, R1CR,,1.
5, R1CR,,1.
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48, R2CR,,1.
*NODE PRINT,NSET=Nall,FREQUENCY=30
NT
*EL PRINT,ELSET=Eall,FREQUENCY=30
HFL
*END STEP
