**
**   Structure: cantilever beam under temperature loading.
**   Test objective: geometrically nonlinear calculation.
**
*HEADING
Model: beam     Date: 10-Mar-1998
*NODE
     1,      0.000000,      0.000000,      0.000000
     2,      1.000000,      0.000000,      0.000000
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*ELEMENT, TYPE=C3D20R   , ELSET=B1
     1,     1,    10,    95,    19,    61,   105,   222,   192,     9,    93,
           94,    20,   104,   220,   221,   193,    62,   103,   219,   190
     2,    10,     2,    13,    95,   105,    34,   134,   222,    11,    12,
           96,    93,   106,   133,   223,   220,   103,    33,   132,   219
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*NSET, NSET=CN7
    97,    96,    95,    94,    93,    20
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*BOUNDARY
CN7, 1,3
*NSET,NSET=FIX
     7,
     8,
    27,
    28,
    29,
*BOUNDARY
FIX,1,3
*NSET,NSET=NALL,GENERATE
1,261
*ELSET,ELSET=EALL,GENERATE
1,32
*MATERIAL,NAME=EL
*ELASTIC
210000.,.3,0.
210000.,.3,2000.
*EXPANSION
12.E-6,0.
12.E-6,2000.
*DENSITY
7.8E-9,0.
7.8E-9,2000.
*INITIAL CONDITIONS,TYPE=TEMPERATURE
NALL,0.
*SOLID SECTION,ELSET=EALL,MATERIAL=EL
*STEP,NLGEOM
*STATIC
1.,1.
*TEMPERATURE
NALL,100.
*NODE PRINT,NSET=NALL
U
*EL PRINT,ELSET=EALL
S
*END STEP
