**
**   Structure: cantilever beam loaded by tensile forces.
**   Test objective: plasticity with isotropic hardening,
**                   followed by creep
**                   use of *CHANGE MATERIAL and *CHANGE PLASTIC
**
*HEADING
Model: beam     Date: 10-Mar-1998
*NODE
     1,      0.000000,      0.000000,      0.000000
     2,      1.000000,      0.000000,      0.000000
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*ELEMENT, TYPE=C3D20R   , ELSET=B1
     1,     1,    10,    95,    19,    61,   105,   222,   192,     9,    93,
           94,    20,   104,   220,   221,   193,    62,   103,   219,   190
     2,    10,     2,    13,    95,   105,    34,   134,   222,    11,    12,
           96,    93,   106,   133,   223,   220,   103,    33,   132,   219
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*NSET, NSET=CN7
    97,    96,    95,    94,    93,    20
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*BOUNDARY
CN7,3,3
1,1,2
2,2,2
*ELSET,ELSET=EALL,GENERATE
1,32
*NSET,NSET=NALL,GENERATE
1,261
*MATERIAL,NAME=HY
*ELASTIC
210000.,.3
*PLASTIC
800.,0.
1600.,.1
*CREEP
1.e-10,5.
*DENSITY
7.8E-9
*SOLID SECTION,ELSET=EALL,MATERIAL=HY
*NSET,NSET=LAST
5,6,7,8,22,25,28,31,100
*NSET,NSET=GIBO
5,
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*NSET,NSET=N1
100
*NSET,NSET=N2
22,25,28,31
*NSET,NSET=N3
5,6,7,8
*NSET,NSET=N4
21,23,24,26,27,29,30,32
*NSET,NSET=N5
98,99,101,102
*AMPLITUDE,NAME=A1
0.,0.,1.,1.
*ELSET,ELSET=E1
32
*STEP
*STATIC
0.01,1.,,0.1
*BOUNDARY
N1,3,3,.1
N2,3,3,.1
N3,3,3,.1
N4,3,3,.1
N5,3,3,.1
*EL PRINT,ELSET=E1
S,PE
*END STEP
*STEP
*STATIC
1.,1.
*EL PRINT,ELSET=E1
S,PE
*END STEP
*STEP
*VISCO,CETOL=1.
0.01,1.,,0.1
*CHANGE MATERIAL,NAME=HY
*CHANGE PLASTIC
0.,0.
0.,100.
*EL PRINT,ELSET=E1
S,PE
*END STEP
