**
**   Structure: cantilever beam.
**   Test objective: varying temperature field.
**   Material properties are temperature dependent.
**
*HEADING
Model: beam     Date: 10-Mar-1998
*NODE
     1,      0.000000,      0.000000,      0.000000
     2,      1.000000,      0.000000,      0.000000
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*ELEMENT, TYPE=C3D20R   , ELSET=B1
     1,     1,    10,    95,    19,    61,   105,   222,   192,     9,    93,
           94,    20,   104,   220,   221,   193,    62,   103,   219,   190
     2,    10,     2,    13,    95,   105,    34,   134,   222,    11,    12,
           96,    93,   106,   133,   223,   220,   103,    33,   132,   219
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*NSET, NSET=CN7
    97,    96,    95,    94,    93,    20
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*BOUNDARY
CN7,3,3
1,1,2
2,2,2
*ELSET,ELSET=EALL,GENERATE
1,32
*NSET,NSET=NALL,GENERATE
1,261
*MATERIAL,NAME=EL
*ELASTIC
210000.,.3,0.
100000.,.3,1000.
*EXPANSION,ZERO=0.
12.E-6,0.
24.E-6,1000.
*SOLID SECTION,ELSET=EALL,MATERIAL=EL
*INITIAL CONDITIONS,TYPE=TEMPERATURE
NALL,100.
*NSET,NSET=Nse1
3,
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*NSET,NSET=Nse2
14,
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*NSET,NSET=Nse3
13,
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*NSET,NSET=Nse4
12,
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*NSET,NSET=Nse5
1,
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*STEP
*STATIC
*TEMPERATURE
Nse1,900.
Nse2,800.
Nse3,700.
Nse4,600.
Nse5,500.
*NODE PRINT,NSET=NALL
U
*EL PRINT,ELSET=EALL
S
*END STEP
