**
**   Structure: cantilever beam.
**   Test objective: transient heat transfer analysis
**
*HEADING
Model: beam     Date: 10-Mar-1998
*NODE
     1,      0.000000,      0.000000,      0.000000
     2,      1.000000,      0.000000,      0.000000
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*ELEMENT, TYPE=C3D20R   , ELSET=B1
     1,     1,    10,    95,    19,    61,   105,   222,   192,     9,    93,
           94,    20,   104,   220,   221,   193,    62,   103,   219,   190
     2,    10,     2,    13,    95,   105,    34,   134,   222,    11,    12,
           96,    93,   106,   133,   223,   220,   103,    33,   132,   219
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*NSET, NSET=CN7
    97,    96,    95,    94,    93,    20
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*NSET,NSET=NALL,GENERATE
1,261
*ELSET,ELSET=Eall,GENERATE
1,32
*MATERIAL,NAME=EL
*DENSITY
7.8E-9
*CONDUCTIVITY
50.,0.
*SPECIFIC HEAT
446.E6
*SOLID SECTION,ELSET=Eall,MATERIAL=EL
*NSET,NSET=GIBO
5,
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*INITIAL CONDITIONS,TYPE=TEMPERATURE
Nall,20.
*STEP,INC=100
*HEAT TRANSFER
1.e-3,10.
*BOUNDARY
GIBO,11,11,100.
CN7,11,11,20.
*NODE PRINT,NSET=Nall,FREQUENCY=10
NT
*EL PRINT,ELSET=Eall,FREQUENCY=10
HFL
*END STEP
