*NODE, NSET=Nall
       1,0.000000000000e+00,9.998476951564e-01,1.745240643728e-02
       2,0.000000000000e+00,1.000000000000e+00,0.000000000000e+00
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*ELEMENT, TYPE=C3D20, ELSET=Eall
     1,     1,     2,     3,     4,     5,     6,     7,     8,     9,    10,
          11,    12,    17,    18,    19,    20,    13,    14,    15,    16
     2,     4,     3,    21,    22,     8,     7,    23,    24,    11,    25,
          26,    27,    19,    30,    31,    32,    16,    15,    28,    29
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*NSET,NSET=Nin
1,
2,
5,
6,
9,
13,
14,
17,
69,
70,
73,
74,
77,
*NSET,NSET=Nout
57,
58,
59,
60,
62,
64,
65,
67,
102,
103,
104,
105,
107,
*SURFACE,NAME=S1,TYPE=ELEMENT
6,S3
1,S3
*MATERIAL,NAME=EL
*CONDUCTIVITY
8.8541878176e-12
*SOLID SECTION,ELSET=Eall,MATERIAL=EL
*STEP
*HEAT TRANSFER,STEADY STATE
*BOUNDARY
Nin,11,11,2.
Nout,11,11,1.
*SECTION PRINT,SURFACE=S1,NAME=SP1
FLUX
*END STEP
