**
**   Structure: cantilever beam subject to point forces.
**   Test objective: C3D10 elements. Stress based refinement.
**
*NODE,NSET=NALL
       1,            1.,0,0.
       2,            0.,0,0.
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*ELEMENT, TYPE=C3D10, ELSET=EALL
      37,       2,      22,      19,      40,      24,      23,      21,
      41,      43,     150
      38,       2,       3,      54,       1,       5,      56,     151,
       4,       6,      68
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*SURFACE, NAME=Sfix
38, S2
49, S2
*NSET,NSET=FIX
1,4,2,6,5,8,3,9,7
*NSET,NSET=LOAD
10,15,12,13,14,18,11,17,16
*BOUNDARY
1,1,2
2,2,2
FIX,3,3
*MATERIAL,NAME=EL
*ELASTIC
210000.,.3
*SOLID SECTION,ELSET=EALL,MATERIAL=EL
*STEP
*STATIC
*CLOAD
LOAD,2,1.
*NODE PRINT,NSET=FIX,TOTALS=ONLY
RF
*SECTION PRINT,SURFACE=Sfix,NAME=SP1
SOF,SOM
***NODE FILE
**U
***EL FILE
**S
*REFINE MESH,LIMIT=50.
S
*END STEP
