**
**   Structure: cantilever beam subject to point forces.
**   Test objective: C3D10 elements. Stress based refinement.
**
*NODE
         1, 0.1000000000000E+01, 0.2051692149507E-19, 0.1110223024625E-15
         2, 0.0000000000000E+00, 0.2051692149507E-19, 0.1110223024625E-15
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*ELEMENT,TYPE=C3D10,ELSET=TET
         1,       478,       434,       376,       487,      3011,      2700,      2697,      3140,      3010,      2696,
         2,       472,       453,       250,       493,      3074,      2190,      2189,      3129,      3073,      2187,
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*NSET,NSET=FIX
1,
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*SURFACE, NAME=Sfix
303, S1
1096, S1
282, S1
798, S1
648, S1
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981, S1
*NSET,NSET=LOAD
16,11,10,12,628,629,621,624,627
*BOUNDARY
1,1,2
2,2,2
FIX,3,3
*MATERIAL,NAME=EL
*ELASTIC
210000.,.3
*SOLID SECTION,ELSET=TET,MATERIAL=EL
*STEP
*STATIC
*CLOAD
LOAD,2,1.
*NODE PRINT,NSET=FIX,TOTALS=ONLY
RF
*SECTION PRINT,SURFACE=Sfix,NAME=SP1
SOF,SOM
***NODE FILE
**U
***EL FILE
**S
*END STEP
