**
**   Structure: fluid flow between two plates.
**   Test objective: stationary compressible Couette
**                   with fixed wall temperature.
**                   velocity:linear between 0. and 1.
**                   temperature: maximum of 1.125
**                   extremely slanted elements
**                   MODIFIED SMART,SIMPLEC,transient approach
**
*NODE, NSET=Nall
       1,6.000000000000e+00,0.000000000000e+00,0.000000000000e+00
       2,5.400000000000e+00,0.000000000000e+00,0.000000000000e+00
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*ELEMENT, TYPE=F3D8R, ELSET=Eall
     1,     1,     2,     3,     4,     5,     6,     7,     8
     2,     5,     6,     7,     8,     9,    10,    11,    12
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** Surfaces based on in
*SURFACE, NAME=Sin
91, S4
92, S4
93, S4
94, S4
95, S4
96, S4
97, S4
98, S4
99, S4
100, S4
** Surfaces based on out
*SURFACE, NAME=Sout
1, S6
2, S6
3, S6
4, S6
5, S6
6, S6
7, S6
8, S6
9, S6
10, S6
** Surfaces based on side
*SURFACE, NAME=Sside
1, S3
11, S3
1, S5
11, S5
2, S3
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100, S5
** Surfaces based on up
*SURFACE, NAME=Sup
10, S2
20, S2
30, S2
40, S2
50, S2
60, S2
70, S2
80, S2
90, S2
100, S2
** Surfaces based on do
*SURFACE, NAME=Sdo
1, S1
11, S1
21, S1
31, S1
41, S1
51, S1
61, S1
71, S1
81, S1
91, S1
*MATERIAL,NAME=AIR
*FLUID CONSTANTS
1.,1.
*SPECIFIC GAS CONSTANT
0.285714286
*CONDUCTIVITY
1.
*SOLID SECTION,ELSET=Eall,MATERIAL=AIR
*INITIAL CONDITIONS,TYPE=FLUID VELOCITY
Nall,1,1.
Nall,2,0.
Nall,3,0.
*INITIAL CONDITIONS,TYPE=PRESSURE
Nall,1.
*INITIAL CONDITIONS,TYPE=TEMPERATURE
Nall,1.
*STEP,INCF=100
*CFD,COMPRESSIBLE,SCHEME=MODSMART,SIMPLEC,2D
1.e10,1.e10,,,
*BOUNDARYF
Sin,S,2,3,0.
Sout,S,8,8,1.
Sup,S,2,3,0.
Sup,S,1,1,1.
Sdo,S,1,3,0.
91,S4,1,1,.05
92,S4,1,1,.15
93,S4,1,1,.25
94,S4,1,1,.35
95,S4,1,1,.45
96,S4,1,1,.55
97,S4,1,1,.65
98,S4,1,1,.75
99,S4,1,1,.85
100,S4,1,1,.95
Sin,S,11,11,1.
Sup,S,11,11,1.
Sdo,S,11,11,1.
*MASS FLOW
Sside,M,0.
*NODE PRINT,FREQUENCYF=100,NSET=Nall
VF,PSF,TSF,MACH
*END STEP
