**
**   Structure: 2d Couette compressible concentric fluid flow
**   Test objective: CFD Finite Volume Method
**                   inner wall: tangential velocity 2, temperature 1.
**                   outer wall: tangential velocity 1, temperature 1.
**                   viscous stress and heat flux output in a
**                   local cylindrical system
**   Analytical solution: v proportional to 1/r
**                        T (r=0.75) = 1.467
**                        p difference inner/outer wall = ??
**
*NODE, NSET=Nall
       1,-1.000000000000e+00,0.000000000000e+00,0.000000000000e+00
       2,-9.807852804032e-01,1.950903220161e-01,0.000000000000e+00
       3,-9.807852804032e-01,1.950903220161e-01,1.000000000000e-01
       4,-1.000000000000e+00,0.000000000000e+00,1.000000000000e-01
       5,-8.750000000000e-01,0.000000000000e+00,0.000000000000e+00
       6,-8.581871203528e-01,1.707040317641e-01,-2.220446049250e-16
       7,-8.581871203528e-01,1.707040317641e-01,1.000000000000e-01
       8,-8.750000000000e-01,0.000000000000e+00,1.000000000000e-01
       9,-7.500000000000e-01,0.000000000000e+00,0.000000000000e+00
      10,-7.355889603024e-01,1.463177415121e-01,5.551115123126e-17
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*ELEMENT, TYPE=F3D8R,ELSET=Eall
     1,     1,     2,     3,     4,     5,     6,     7,     8
     2,     5,     6,     7,     8,     9,    10,    11,    12
     3,     9,    10,    11,    12,    13,    14,    15,    16
     4,    13,    14,    15,    16,    17,    18,    19,    20
     5,     2,    21,    22,     3,     6,    23,    24,     7
     6,     6,    23,    24,     7,    10,    25,    26,    11
     7,    10,    25,    26,    11,    14,    27,    28,    15
     8,    14,    27,    28,    15,    18,    29,    30,    19
     9,    21,    31,    32,    22,    23,    33,    34,    24
    10,    23,    33,    34,    24,    25,    35,    36,    26
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** Surfaces based on solidsurface
*SURFACE, NAME=SOLIDSURFACE
1, S1
61, S1
5, S1
4, S2
64, S2
8, S2
9, S1
12, S2
13, S1
16, S2
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*TRANSFORMF,TYPE=C,SURFACE=SOLIDSURFACE
0.,0.,0.,0.,0.,1.
*MATERIAL,NAME=AIR
*FLUID CONSTANTS
1.,1.
*SPECIFIC GAS CONSTANT
0.285714286
*CONDUCTIVITY
1.
*SOLID SECTION,ELSET=Eall,MATERIAL=AIR
*INITIAL CONDITIONS,TYPE=PRESSURE
Nall,1.
*INITIAL CONDITIONS,TYPE=FLUID VELOCITY
Nall,1,0.
Nall,2,0.
Nall,3,0.
*INITIAL CONDITIONS,TYPE=TEMPERATURE
Nall,1.
*STEP,INCF=300
*CFD,STEADY STATE,COMPRESSIBLE,2D
*BOUNDARYF
** BOUNDARYF based on in
4, S2, 1,, 0.000000
64, S2, 1,, 0.000000
8, S2, 1,, 0.000000
12, S2, 1,, 0.000000
16, S2, 1,, 0.000000
20, S2, 1,, 0.000000
24, S2, 1,, 0.000000
28, S2, 1,, 0.000000
32, S2, 1,, 0.000000
100, S2, 1,, 0.000000
36, S2, 1,, 0.000000
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** BOUNDARYF based on in
4, S2, 2,, 2.000000
64, S2, 2,, 2.000000
8, S2, 2,, 2.000000
12, S2, 2,, 2.000000
16, S2, 2,, 2.000000
20, S2, 2,, 2.000000
24, S2, 2,, 2.000000
28, S2, 2,, 2.000000
32, S2, 2,, 2.000000
100, S2, 2,, 2.000000
36, S2, 2,, 2.000000
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** BOUNDARYF based on in
4, S2, 3,, 0.000000
64, S2, 3,, 0.000000
8, S2, 3,, 0.000000
12, S2, 3,, 0.000000
16, S2, 3,, 0.000000
20, S2, 3,, 0.000000
24, S2, 3,, 0.000000
28, S2, 3,, 0.000000
32, S2, 3,, 0.000000
100, S2, 3,, 0.000000
36, S2, 3,, 0.000000
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** BOUNDARYF based on out
1, S1, 1,, 0.000000
61, S1, 1,, 0.000000
5, S1, 1,, 0.000000
9, S1, 1,, 0.000000
13, S1, 1,, 0.000000
17, S1, 1,, 0.000000
21, S1, 1,, 0.000000
25, S1, 1,, 0.000000
29, S1, 1,, 0.000000
97, S1, 1,, 0.000000
33, S1, 1,, 0.000000
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** BOUNDARYF based on out
1, S1, 2,, 1.000000
61, S1, 2,, 1.000000
5, S1, 2,, 1.000000
9, S1, 2,, 1.000000
13, S1, 2,, 1.000000
17, S1, 2,, 1.000000
21, S1, 2,, 1.000000
25, S1, 2,, 1.000000
29, S1, 2,, 1.000000
97, S1, 2,, 1.000000
33, S1, 2,, 1.000000
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** BOUNDARYF based on out
1, S1, 3,, 0.000000
61, S1, 3,, 0.000000
5, S1, 3,, 0.000000
9, S1, 3,, 0.000000
13, S1, 3,, 0.000000
17, S1, 3,, 0.000000
21, S1, 3,, 0.000000
25, S1, 3,, 0.000000
29, S1, 3,, 0.000000
97, S1, 3,, 0.000000
33, S1, 3,, 0.000000
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** BOUNDARYF based on in
4, S2, 11,, 1.000000
64, S2, 11,, 1.000000
8, S2, 11,, 1.000000
12, S2, 11,, 1.000000
16, S2, 11,, 1.000000
20, S2, 11,, 1.000000
24, S2, 11,, 1.000000
28, S2, 11,, 1.000000
32, S2, 11,, 1.000000
100, S2, 11,, 1.000000
36, S2, 11,, 1.000000
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** BOUNDARYF based on out
1, S1, 11,, 1.000000
61, S1, 11,, 1.000000
5, S1, 11,, 1.000000
9, S1, 11,, 1.000000
13, S1, 11,, 1.000000
17, S1, 11,, 1.000000
21, S1, 11,, 1.000000
25, S1, 11,, 1.000000
29, S1, 11,, 1.000000
97, S1, 11,, 1.000000
33, S1, 11,, 1.000000
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** BOUNDARYF based on fixz
1, S3, 3,, 0.000000
61, S3, 3,, 0.000000
5, S3, 3,, 0.000000
1, S5, 3,, 0.000000
5, S5, 3,, 0.000000
61, S5, 3,, 0.000000
2, S3, 3,, 0.000000
62, S3, 3,, 0.000000
6, S3, 3,, 0.000000
2, S5, 3,, 0.000000
6, S5, 3,, 0.000000
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*NODE FILE,FREQUENCYF=300
VF,PSF,TSF
*END STEP
