**
**   Structure: hollow cylinder.
**   Test objective: *COUPLING, *DISTRIBUTING for rotations.
**                   noncentral reference node
**
*NODE, NSET=Nall
       1,5.551115123126e-17,1.100000000000e+00,0.000000000000e+00
       2,4.209517756016e-01,1.016267485762e+00,0.000000000000e+00
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*ELEMENT, TYPE=C3D20R, ELSET=Eall
     1,     1,     2,     3,     4,     5,     6,     7,     8,     9,    10,
          11,    12,    17,    18,    19,    20,    13,    14,    15,    16
     2,     4,     3,    21,    22,     8,     7,    23,    24,    11,    25,
          26,    27,    19,    30,    31,    32,    16,    15,    28,    29
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** Names based on fix
*NSET,NSET=Nfix
1,
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*BOUNDARY
Nfix, 1
*BOUNDARY
Nfix, 2
*BOUNDARY
Nfix, 3
*MATERIAL,NAME=EL
*ELASTIC
  210000.0,        .3
*SOLID SECTION,ELSET=Eall,MATERIAL=EL
*SURFACE, NAME=S1
10, S5
20, S5
80, S5
30, S5
40, S5
130, S5
50, S5
60, S5
120, S5
70, S5
90, S5
100, S5
160, S5
110, S5
140, S5
150, S5
*ORIENTATION,NAME=OR1,SYSTEM=CYLINDRICAL
0.,0.,0.,0.,0.,1.
*COUPLING,REF NODE=1201,SURFACE=S1,ORIENTATION=OR1,CONSTRAINT NAME=CN1
*KINEMATIC
2
*STEP
*STATIC
*BOUNDARY
1201,6,6,.01
*SECTION PRINT,SURFACE=S1,NAME=SP1
SOF,SOM
*NODE FILE
U
*END STEP
