**
**   Structure: dam.
**   Test objective: groundwater flow analysis.
**
*NODE, NSET=Nall
       1, -3.00000e+01, -1.34110e-07,  0.00000e+00
       2, -3.00000e+01, -4.53062e-01,  0.00000e+00
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*ELEMENT, TYPE=CPS8, ELSET=Eall
     1,      1,      2,      3,      4,      5,      6,      7,      8
     2,      4,      3,      9,     10,      7,     11,     12,     13
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*ELSET,ELSET=Earea1
1,
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*ELSET,ELSET=Earea2
161,
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*NSET,NSET=Nup
342,
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*NSET,NSET=Ndown
982,
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*MATERIAL,NAME=MAT1
*CONDUCTIVITY,TYPE=ORTHO
1.E-2,25.E-4,1.E-4
*MATERIAL,NAME=MAT2
*CONDUCTIVITY,TYPE=ORTHO
1.E-4,4.E-4,1.E-4
*SOLID SECTION,ELSET=Earea1,MATERIAL=MAT1
*SOLID SECTION,ELSET=Earea2,MATERIAL=MAT2
*INITIAL CONDITIONS,TYPE=TEMPERATURE
Nall,0.
**
*STEP
*HEAT TRANSFER,STEADY STATE
*BOUNDARY
Nup,11,11,8.5344
*BOUNDARY
Ndown,11,11,3.9624
*NODE PRINT,NSET=Nall
NT
*END STEP
