**
**   Structure: cantilever plate.
**   Test objective: C3D20R elements (frequencies).
**                   cf. example dloadlinIf.inp
**
*NODE, NSET=Nall
       1,0.000000000000e+00,3.000000000000e+01,0.000000000000e+00
       2,0.000000000000e+00,0.000000000000e+00,0.000000000000e+00
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*ELEMENT, TYPE=C3D20, ELSET=Eall
     1,     1,     2,     3,     4,     5,     6,     7,     8,     9,    10,
          11,    12,    17,    18,    19,    20,    13,    14,    15,    16
     2,     4,     3,    21,    22,     8,     7,    23,    24,    11,    25,
          26,    27,    19,    30,    31,    32,    16,    15,    28,    29
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*solid section, elset=Eall, material=steel
*NSET,NSET=left
1, 2, 5, 6,9,13,14,17
*material, name=steel
*elastic, type=iso
209000.0, 0.3000,
*density
7.85e-09
*boundary
left, 1,3
*step
*frequency
10
*end step
