**
**   Structure: cantilever plate.
**   Test objective: C3D8I elements (frequencies).
**                   cf. example dloadlin20f.inp for a
**                   comparison with c3d20
**
*NODE, NSET=nall
1, 0.000e+00, 3.000e+01, 0.000e+00
2, 0.000e+00, 0.000e+00, 0.000e+00
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*ELEMENT, TYPE=C3D8I, ELSET=elall
1, 1, 2, 3, 4, 5, 6, 7, 8, 9, 10,
2, 4, 3, 21, 22, 8, 7, 23, 24, 11, 25,
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*solid section, elset=elall, material=steel
*NSET,NSET=left
1, 2, 5, 6
*nset, nset=right
180, 183, 185, 188
*material, name=steel
*elastic, type=iso
209000.0, 0.3000,
*density
7.85e-09
*boundary
left, 1,3
*step, inc=10000
*frequency
10
*node print, nset=left
rf
*end step
