**
**   Structure: two cubes.
**   Test objective: sticking friction contact.
**
**
*NODE, NSET=Nall
       1,1.000000000000e+00,1.000000000000e+00,0.000000000000e+00
       2,1.000000000000e+00,7.500000000000e-01,0.000000000000e+00
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*ELEMENT, TYPE=C3D8, ELSET=Eall
     1,     1,     2,     3,     4,     5,     6,     7,     8
     2,     4,     3,     9,    10,     8,     7,    11,    12
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*NSET,NSET=Nfix
1,
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*NSET,NSET=Nload
142,
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*SURFACE, NAME=Smast
4, S5
8, S5
12, S5
16, S5
20, S5
24, S5
28, S5
32, S5
36, S5
40, S5
44, S5
48, S5
52, S5
56, S5
60, S5
64, S5
*SURFACE, NAME=Sslav
65, S3
69, S3
73, S3
77, S3
81, S3
85, S3
89, S3
93, S3
97, S3
101, S3
105, S3
109, S3
113, S3
117, S3
121, S3
125, S3
*MATERIAL,NAME=EL
*ELASTIC
210000.,.3
*DENSITY
7.8E-9
*SOLID SECTION,ELSET=Eall,MATERIAL=EL
*BOUNDARY
Nfix,1,3
Nload,1,2
*CONTACT PAIR,INTERACTION=SI1,TYPE=NODE TO SURFACE
Sslav,Smast
*SURFACE INTERACTION,NAME=SI1
*SURFACE BEHAVIOR,PRESSURE-OVERCLOSURE=LINEAR
1.e7,3.
*FRICTION
0.2,47000
*AMPLITUDE,NAME=A1
0.,1.,1.,1.
*STEP,NLGEOM
*STATIC
1.,1.
*DLOAD,AMPLITUDE=A1
68, P5, 100.000000
72, P5, 100.000000
76, P5, 100.000000
80, P5, 100.000000
84, P5, 100.000000
88, P5, 100.000000
92, P5, 100.000000
96, P5, 100.000000
100, P5, 100.000000
104, P5, 100.000000
108, P5, 100.000000
112, P5, 100.000000
116, P5, 100.000000
120, P5, 100.000000
124, P5, 100.000000
128, P5, 100.000000
*CONTACT PRINT,NSET=Nall
CDISP,CSTRESS
*END STEP
