**
**   Structure: disk segment
**   Test objective: cyclic symmetry for a structure containing the
**                   axis of cyclic symmetry for nodal diameter 1
**   The first two eigenfrequencies of nodal diameter 0
**   and the first two eigenvalues of nodal diameter 1
**   correspond to rigid body modes. They are small compared to
**   the other eigenfrequencies, however, their values
**   highly depend on the computer system
**
*NODE, NSET=Nall
       1,  1.86265e-09,  9.65573e-01,  2.60134e-01
       2,  1.86265e-09,  9.80586e-01,  1.96092e-01
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*ELEMENT, TYPE=C3D20, ELSET=Eall
     1,     1,     2,     3,     4,     5,     6,     7,     8,     9,    10,
          11,    12,    17,    18,    19,    20,    13,    14,    15,    16
     2,     2,    21,    22,     3,     6,    23,    24,     7,    25,    26,
          27,    10,    30,    31,    32,    18,    14,    28,    29,    15
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*MATERIAL,NAME=EL
*ELASTIC
210000.,.3
*DENSITY
7.8E-9
*SOLID SECTION,ELSET=Eall,MATERIAL=EL
*NSET,NSET=Nleft
916,
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*NSET,NSET=Nright
916,
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*SURFACE,NAME=left,TYPE=NODE
Nleft
*SURFACE,NAME=right,TYPE=NODE
Nright
*TIE,CYCLIC SYMMETRY,POSITION TOLERANCE=1.,NAME=T1
left,right
*CYCLIC SYMMETRY MODEL,N=12,NGRAPH=1
0.,0.,0.,1.,0.,0.
*STEP
*FREQUENCY
10
*SELECT CYCLIC SYMMETRY MODES,NMIN=0,NMAX=0
*END STEP
*STEP
*FREQUENCY
10
*SELECT CYCLIC SYMMETRY MODES,NMIN=1,NMAX=1
*END STEP
*STEP
*FREQUENCY
10
*SELECT CYCLIC SYMMETRY MODES,NMIN=2,NMAX=2
*END STEP
