**
**   Structure: cantilever beam.
**   Test objective: *COUPLING, *KINEMATIC simulating
**                   a hinge for large displacements
**
*HEADING
Model: beam     Date: 10-Mar-1998
*NODE
     1,      0.000000,      0.000000,      0.000000
     2,      1.000000,      0.000000,      0.000000
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*ELEMENT, TYPE=C3D20R   , ELSET=Eall
     1,     1,    10,    95,    19,    61,   105,   222,   192,     9,    93,
           94,    20,   104,   220,   221,   193,    62,   103,   219,   190
     2,    10,     2,    13,    95,   105,    34,   134,   222,    11,    12,
           96,    93,   106,   133,   223,   220,   103,    33,   132,   219
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*MATERIAL,NAME=EL
*ELASTIC
  210000.0,        .3
*SOLID SECTION,ELSET=Eall,MATERIAL=EL
*SURFACE, NAME=S1
2,S4
4,S4
30,S4
32,S4
6,S4
10,S4
14,S4
18,S4
22,S4
26,S4
8,S4
12,S4
16,S4
20,S4
24,S4
28,S4
*COUPLING,REF NODE=262,SURFACE=S1,CONSTRAINT NAME=CN1
*KINEMATIC
1,3
*NSET,NSET=N1
100
*STEP,NLGEOM
*STATIC
*BOUNDARY
262,1,5
262,6,6,1.57
*NODE PRINT,NSET=N1,FREQUENCY=100
U
*END STEP
