**
**   Structure: two cubes on top of each other.
**   Test objective: Mortar contact (soft).
**        Ph.D. Thesis Stefan Hüeber, example p 73
**
*NODE, NSET=Nall
       1,1.000000000000e-02,1.000000000000e-02,0.000000000000e+00
       2,1.000000000000e-02,9.833333333333e-03,0.000000000000e+00
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*ELEMENT, TYPE=C3D8, ELSET=Eall
     1,     1,     2,     3,     4,     5,     6,     7,     8
     2,     5,     6,     7,     8,     9,    10,    11,    12
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*NSET,NSET=Ncopy1
1,
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*ELSET,ELSET=Ecopy1
1,
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*NSET,NSET=Ncopy2
7443,
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*ELSET,ELSET=Ecopy2
3601,
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*SURFACE, NAME=Smast2
1, S6
2, S6
3, S6
4, S6
5, S6
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60, S6
*SURFACE, NAME=Sslav2
8431, S4
8432, S4
8433, S4
8434, S4
8435, S4
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8500, S4
*NSET,NSET=Ncopy2_l1
7723,
7726,
*NSET,NSET=Ncopy2_l2
17523,
17524,
*NSET,NSET=Ncopy2_l3
7724,
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*NSET,NSET=Ncopy1_r1
1,
4,
*NSET,NSET=Ncopy1_r2
7321,
7322,
*NSET,NSET=Ncopy1_r3
2,
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*BOUNDARY
7321, 1, ,
7322, 1, ,
7323, 1, ,
7324, 1, ,
7325, 1, ,
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17524, 3, ,
*NSET,NSET=Nout
1,
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*MATERIAL,NAME=E1
*ELASTIC
15.00000e+09,.2
*SOLID SECTION,ELSET=Ecopy1,MATERIAL=E1
*MATERIAL,NAME=E2
*ELASTIC
20.00000e+09,.4
*SOLID SECTION,ELSET=Ecopy2,MATERIAL=E2
*CONTACT PAIR,INTERACTION=SI1, TYPE=SURFACE TO SURFACE
Sslav2,Smast2
*SURFACE INTERACTION,NAME=SI1
*SURFACE BEHAVIOR,PRESSURE-OVERCLOSURE=LINEAR
1000.e+9,.2
*STEP
*STATIC
*CLOAD
Ncopy2_l1, 1,  4.1667e-03
Ncopy2_l1, 2, -4.1667e-02
Ncopy2_l3, 1,  8.3333e-03
Ncopy2_l3, 2, -8.3333e-02
Ncopy2_l2, 1,  4.1667e-03
Ncopy2_l2, 2, -4.1667e-02
Ncopy1_r1, 1, -4.1667e-03
Ncopy1_r1, 2, -4.1667e-02
Ncopy1_r3, 1, -8.3333e-03
Ncopy1_r3, 2, -8.3333e-02
Ncopy1_r2, 1, -4.1667e-03
Ncopy1_r2, 2, -4.1667e-02
*NODE PRINT,NSET=Nout,FREQUENCY=100
U
*END STEP
