**
**   Structure: cantilever beam.
**   Test objective: pure rotation about 17 degrees
**                   nlgeom and undo_nlgeom_lin_el orthotropic material
**                   => zero strains
**
*HEADING
Model: beam     Date: 10-Mar-1998
*NODE
     1,      0.000000,      0.000000,      0.000000
     2,      1.000000,      0.000000,      0.000000
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*ELEMENT, TYPE=C3D20R   , ELSET=Eall
     1,     1,    10,    95,    19,    61,   105,   222,   192,     9,    93,
           94,    20,   104,   220,   221,   193,    62,   103,   219,   190
     2,    10,     2,    13,    95,   105,    34,   134,   222,    11,    12,
           96,    93,   106,   133,   223,   220,   103,    33,   132,   219
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*BOUNDARY
19,1,3
94,1,3
95,1,3
96,1,3
13,1,3
100,1,1
*MATERIAL,NAME=UNDO_NLGEOM_LIN_EL_1
*USER MATERIAL,CONSTANTS=9
500000.,157200.,400000.,157200.,157200.,300000.,126200.,126200.,
126200.,294.
*SOLID SECTION,ELSET=Eall,MATERIAL=UNDO_NLGEOM_LIN_EL_1
*STEP,NLGEOM
*STATIC
*BOUNDARY
100,2,2,0.041887711
100,3,3,-0.000109662
*EL FILE
E
*END STEP
