**
**   Structure: cantilever beam.
**   Test objective: eigenfrequencies and eigenmodes in
**                   the presence of a point mass.
**                   Compare with example beamf.
**
*HEADING
Model: beam     Date: 10-Mar-1998
*NODE
     1,      0.000000,      0.000000,      0.000000
     2,      1.000000,      0.000000,      0.000000
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*ELEMENT, TYPE=C3D20R   , ELSET=B1
     1,     1,    10,    95,    19,    61,   105,   222,   192,     9,    93,
           94,    20,   104,   220,   221,   193,    62,   103,   219,   190
     2,    10,     2,    13,    95,   105,    34,   134,   222,    11,    12,
           96,    93,   106,   133,   223,   220,   103,    33,   132,   219
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*ELEMENT,TYPE=MASS,ELSET=EM
33,100
*MASS,ELSET=EM
1.E-4
*NSET, NSET=CN7
    97,    96,    95,    94,    93,    20
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*BOUNDARY
CN7, 1
*BOUNDARY
CN7, 2
*BOUNDARY
CN7, 3
*ELSET,ELSET=EALL,GENERATE
1,32
*MATERIAL,NAME=EL
*ELASTIC
  210000.0,        .3
*DENSITY
7.8E-9
*SOLID SECTION,MATERIAL=EL,ELSET=EALL
*STEP
*FREQUENCY,SOLVER=ARPACK
10,0.01
*END STEP
