**
**   Structure: cantilever beam.
**   Test objective: *MODEL CHANGE,TYPE=ELEMENT,ADD
**                   stress-free activation of elements
**
*HEADING
Model: beam     Date: 10-Mar-1998
*NODE
     1,      0.000000,      0.000000,      0.000000
     2,      1.000000,      0.000000,      0.000000
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*ELEMENT, TYPE=C3D20R   , ELSET=Eall
     1,     1,    10,    95,    19,    61,   105,   222,   192,     9,    93,
           94,    20,   104,   220,   221,   193,    62,   103,   219,   190
     2,    10,     2,    13,    95,   105,    34,   134,   222,    11,    12,
           96,    93,   106,   133,   223,   220,   103,    33,   132,   219
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*NSET, NSET=FIX
    97,    96,    95,    94,    93,    20
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*BOUNDARY
FIX, 1
*BOUNDARY
FIX, 2
*BOUNDARY
FIX, 3
*NSET,NSET=Nall,GENERATE
1,261
*MATERIAL,NAME=EL
*ELASTIC
  210000.0,        .3
*SOLID SECTION,ELSET=Eall,MATERIAL=EL
*NSET,NSET=LOAD
5,6,7,8,22,25,28,31,100
*ELSET,ELSET=E1
29
*STEP,NLGEOM
*STATIC
*CLOAD
46,1,1.
46,2,-1.
76,1,1.
76,2,1.
49,1,-1.
49,2,-1.
91,1,-1.
91,2,1.
*EL PRINT,ELSET=E1
S
*END STEP
*STEP,NLGEOM
*STATIC
*MODEL CHANGE,TYPE=ELEMENT,REMOVE
29,30,31,32
*END STEP
*STEP,NLGEOM
*STATIC
*MODEL CHANGE,TYPE=ELEMENT,ADD
29,30,31,32
*END STEP
