**
**   Structure: cantilever beam.
**   Test objective: *MODEL CHANGE,TYPE=ELEMENT,MECHSTRAINTORESIDUAL
**                   removing stress in displacement controlled
**                   analysis (by converting the mechanical strain
**                   into residual strain)
**
*HEADING
Model: beam     Date: 10-Mar-1998
*NODE
     1,      0.000000,      0.000000,      0.000000
     2,      1.000000,      0.000000,      0.000000
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*ELEMENT, TYPE=C3D20R   , ELSET=Eall
     1,     1,    10,    95,    19,    61,   105,   222,   192,     9,    93,
           94,    20,   104,   220,   221,   193,    62,   103,   219,   190
     2,    10,     2,    13,    95,   105,    34,   134,   222,    11,    12,
           96,    93,   106,   133,   223,   220,   103,    33,   132,   219
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*NSET, NSET=FIX
    97,    96,    95,    94,    93,    20
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*BOUNDARY
FIX, 1,3
*NSET,NSET=Nall,GENERATE
1,261
*MATERIAL,NAME=EL
*ELASTIC
  210000.0,        .3
*SOLID SECTION,ELSET=Eall,MATERIAL=EL
** Names based on load
*NSET,NSET=Nload
5,
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** Names based on mid
*NSET,NSET=Nmid
40,
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*ELSET,ELSET=E1
29
**
** step 1: ensuring that all elements are stored
**         in the frd-file
**
*STEP,NLGEOM
*STATIC
*EL PRINT,ELSET=E1
S
*END STEP
**
** step 2: application of loading
**         deactivating elements in far half
**
*STEP,NLGEOM
*STATIC
***BOUNDARY
**Nmid,1,1,.05
**Nmid,2,3,0.
*DLOAD
11,P6,100.
9,P6,100.
*MODEL CHANGE,TYPE=ELEMENT,REMOVE
25,26,27,28,29,30,31,32
17,18,19,20,21,22,23,24
*END STEP
**
** step 3: freezing deformation in middle
**         fixing deformation at end
**
*STEP,NLGEOM
*STATIC
*BOUNDARY
Nload,1,3,0.
*BOUNDARY,FIXED
Nmid,1,3
*MODEL CHANGE,TYPE=ELEMENT,ADD=WITH STRAIN
25,26,27,28,29,30,31,32
17,18,19,20,21,22,23,24
*END STEP
**
** step 4: converting mechanical strain in far half
**         into residual strain => no stress
**
*STEP,NLGEOM
*STATIC
*MODEL CHANGE,TYPE=ELEMENT,MECHSTRAINTORESIDUAL
25,26,27,28,29,30,31,32
17,18,19,20,21,22,23,24
*END STEP
**
** step 5: removing boundary condition in middle
**         and at end => no change in stress
**
*STEP,NLGEOM
*STATIC
*BOUNDARY,OP=NEW
FIX, 1,3
*END STEP
