**
**   Structure: cantilever beam.
**   Test objective: frequency calculation
**                   two halves of beam kept together with
**                   pressure-overclosure=tied
**
*NODE, NSET=Nall
       1,1.000000000000e+00,1.000000000000e+00,4.000000000000e+00
       2,5.000000000000e-01,1.000000000000e+00,4.000000000000e+00
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*ELEMENT, TYPE=C3D20, ELSET=Eall
     1,     1,     2,     3,     4,     5,     6,     7,     8,     9,    10,
          11,    12,    17,    18,    19,    20,    13,    14,    15,    16
     2,     4,     3,    21,    22,     8,     7,    23,    24,    11,    25,
          26,    27,    19,    30,    31,    32,    16,    15,    28,    29
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** Names based on fix
*NSET,NSET=FIX
45,
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*MATERIAL,NAME=EL
*ELASTIC
  210000.0,        .3
*density
7.8e-9
*SOLID SECTION,ELSET=Eall,MATERIAL=EL
*BOUNDARY
FIX, 1
*BOUNDARY
FIX, 2
*BOUNDARY
FIX, 3
** Surfaces based on face1
*SURFACE, NAME=Sface1
1, S3
9, S3
5, S3
13, S3
** Surfaces based on face2
*SURFACE, NAME=Sface2
21, S5
36, S5
26, S5
41, S5
31, S5
46, S5
51, S5
56, S5
61, S5
*CONTACT PAIR,INTERACTION=SI1,TYPE=SURFACE TO SURFACE
Sface2,Sface1
*SURFACE INTERACTION,NAME=SI1
*SURFACE BEHAVIOR,PRESSURE-OVERCLOSURE=TIED
1.e7
*FRICTION
0.2,1.e7
*STEP,PERTURBATION
*FREQUENCY
10
*END STEP
