**
**   Structure: punch on top of cube.
**   Test objective: spring contact; ADJUST with NODE SET.
**
*NODE, NSET=Nall
       1,0.000000000000e+00,0.000000000000e+00,1.000000000000e+00
       2,0.000000000000e+00,0.000000000000e+00,6.666666666667e-01
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*ELEMENT, TYPE=C3D20, ELSET=Eall
     1,     1,     2,     3,     4,     5,     6,     7,     8,     9,    10,
          11,    12,    17,    18,    19,    20,    13,    14,    15,    16
     2,     4,     3,    21,    22,     8,     7,    23,    24,    11,    25,
          26,    27,    19,    30,    31,    32,    16,    15,    28,    29
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*MATERIAL,NAME=EL
*ELASTIC
210000.,.0
*SOLID SECTION,ELSET=Eall,MATERIAL=EL
*NSET,NSET=Nfix
153,
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*NSET,NSET=Nfixx
402,
*NSET,NSET=Nload
209,
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*BOUNDARY
Nfix,1,3
Nload,1,2
Nfixx,1,1
*NSET,NSET=CONTACT
357,353,347,346,280,281
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*SURFACE, NAME=Smast
1, S6
2, S6
4, S6
3, S6
5, S6
6, S6
7, S6
8, S6
9, S6
*SURFACE, NAME=Sslav
34, S2
43, S2
35, S2
44, S2
36, S2
45, S2
52, S2
53, S2
54, S2
*CONTACT PAIR,INTERACTION=SI1,ADJUST=CONTACT,TYPE=SURFACE TO SURFACE
Sslav,Smast
*SURFACE INTERACTION,NAME=SI1
*SURFACE BEHAVIOR,PRESSURE-OVERCLOSURE=LINEAR
1.e7,3.
*STEP,NLGEOM
*STATIC
1.,1.
*DLOAD
28, P1, 100.000000
37, P1, 100.000000
29, P1, 100.000000
38, P1, 100.000000
30, P1, 100.000000
39, P1, 100.000000
46, P1, 100.000000
47, P1, 100.000000
48, P1, 100.000000
*NODE PRINT,NSET=Nall,FREQUENCY=100
U
*END STEP
