**
**   Structure: two concentric rings.
**   Test objective: change of eigenfrequencies due to
**                   contact between rings
**                   large displacement stiffness +
**                   stress stiffness
**
*NODE, NSET=Nall
       1,-7.500000000000e-01,1.299038105677e+00,0.000000000000e+00
       2,-6.101049646137e-01,1.370318186464e+00,0.000000000000e+00
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*ELEMENT, TYPE=C3D20, ELSET=Eall
     1,     1,     2,     3,     4,     5,     6,     7,     8,     9,    10,
          11,    12,    17,    18,    19,    20,    13,    14,    15,    16
     2,     4,     3,    21,    22,     8,     7,    23,    24,    11,    25,
          26,    27,    19,    30,    31,    32,    16,    15,    28,    29
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*TRANSFORM,NSET=Nall,TYPE=C
0.,0.,0.,0.,0.,1.
*NSET,NSET=Nout
362,
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*NSET,NSET=Nin
91,
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*NSET,NSET=Nindout
658,
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*NSET,NSET=Nindin
298,
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*NSET,NSET=Ndepout
361,
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*NSET,NSET=Ndepin
1,
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*SURFACE, NAME=Smaster
59, S2
69, S2
60, S2
70, S2
79, S2
80, S2
89, S2
90, S2
99, S2
100, S2
*SURFACE, NAME=Sslave
1, S1
11, S1
2, S1
12, S1
21, S1
22, S1
31, S1
32, S1
41, S1
42, S1
*ELSET,ELSET=Eout
51,
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*ELSET,ELSET=Ein
1,
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*SURFACE,NAME=Sdepin,TYPE=NODE
Ndepin
*SURFACE,NAME=Sdepout,TYPE=NODE
Ndepout
*SURFACE,NAME=Sindin,TYPE=NODE
Nindin
*SURFACE,NAME=Sindout,TYPE=NODE
Nindout
*TIE,CYCLIC SYMMETRY,NAME=Tin
Sdepin,Sindin
*CYCLIC SYMMETRY MODEL,N=12,NGRAPH=1,TIE=Tin,ELSET=Ein
0.,0.,0.,0.,0.,1.
*TIE,CYCLIC SYMMETRY,NAME=Tout
Sdepout,Sindout
*CYCLIC SYMMETRY MODEL,N=12,NGRAPH=1,TIE=Tout,ELSET=Eout
0.,0.,0.,0.,0.,1.
*CONTACT PAIR,INTERACTION=SI1,TYPE=SURFACE TO SURFACE
Sslave,Smaster
*SURFACE INTERACTION,NAME=SI1
*SURFACE BEHAVIOR,PRESSURE-OVERCLOSURE=LINEAR
1.e7,3.
*FRICTION
0.2,1.e5
*MATERIAL,NAME=EL
*ELASTIC
210000.,.3
*DENSITY
7.8E-9
*SOLID SECTION,ELSET=Eall,MATERIAL=EL
*BOUNDARY
228,2,3
536,2,3
Nin,1,3,0.0
Nout,1,3,0.0
*STEP
*FREQUENCY
20
*SELECT CYCLIC SYMMETRY MODES,NMIN=1,NMAX=1
*END STEP
*STEP,NLGEOM
*STATIC
*BOUNDARY
Nin,1,1,0.005
Nout,1,1,-0.005
*END STEP
*STEP,PERTURBATION
*FREQUENCY
20
*MODEL CHANGE,TYPE=CONTACT PAIR,REMOVE
Sslave,Smaster
*SELECT CYCLIC SYMMETRY MODES,NMIN=1,NMAX=1
*END STEP
