**
**   Structure: two rings
**   Test objective: face-to-face penalty contact with cyclic symmetry
**
*NODE, NSET=Nall
       1,5.000000000000e-01,0.000000000000e+00,2.500000000000e-01
       2,5.000000000000e-01,0.000000000000e+00,0.000000000000e+00
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*ELEMENT, TYPE=C3D8, ELSET=Eall
     1,     1,     2,     3,     4,     5,     6,     7,     8
     2,     4,     3,     9,    10,     8,     7,    11,    12
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*MATERIAL,NAME=EL
*ELASTIC
210000.,.0
*DENSITY
7.8E-9
*SOLID SECTION,ELSET=Eall,MATERIAL=EL
*NSET,NSET=Ns1
1,
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*ELSET,ELSET=Es1
1,
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*NSET,NSET=Ns2
579,
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*ELSET,ELSET=Es2
257,
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*NSET,NSET=Ninds1
1,
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*NSET,NSET=Ninds2
579,
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*NSET,NSET=Nload
1123,
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*NSET,NSET=Ndeps1
65,
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*NSET,NSET=Ndeps2
643,
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*NSET,NSET=Nfix3
1,
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*ELSET,ELSET=Efix3
1,
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*NSET,NSET=Nfixx
1,
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*BOUNDARY
Nfix3,3,3
Nfixx,1,2
851,2,2
*SURFACE,NAME=Sinds1,TYPE=NODE
Ninds1
*SURFACE,NAME=Sdeps1,TYPE=NODE
Ndeps1
*TIE, NAME=CS1, CYCLIC SYMMETRY, POSITION TOLERANCE=0.001
Sdeps1,Sinds1
*CYCLIC SYMMETRY MODEL,N=12, TIE=CS1, ELSET=Es1
0.,0.,0.,0.,0.,1.
*SURFACE,NAME=Sinds2,TYPE=NODE
Ninds2
*SURFACE,NAME=Sdeps2,TYPE=NODE
Ndeps2
*TIE, NAME=CS2, CYCLIC SYMMETRY, POSITION TOLERANCE=0.001
Sdeps2,Sinds2
*CYCLIC SYMMETRY MODEL,N=12, TIE=CS2,ELSET=Es2
0.,0.,0.,0.,0.,1.
*SURFACE, NAME=Smast
241, S2
242, S2
243, S2
244, S2
245, S2
246, S2
247, S2
248, S2
249, S2
250, S2
251, S2
252, S2
253, S2
254, S2
255, S2
256, S2
*SURFACE, NAME=Sslav
257, S1
258, S1
259, S1
260, S1
261, S1
262, S1
263, S1
264, S1
265, S1
266, S1
267, S1
268, S1
269, S1
270, S1
271, S1
272, S1
*NSET,NSET=Nslav
579,
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*CONTACT PAIR,INTERACTION=SI1,TYPE=SURFACE TO SURFACE
Sslav,Smast
*SURFACE INTERACTION,NAME=SI1
*SURFACE BEHAVIOR,PRESSURE-OVERCLOSURE=LINEAR
1.E7
*STEP,NLGEOM
*STATIC
1.,1.
*CONTROLS,PARAMETERS=LINE SEARCH
,1.,1.,
*DLOAD
497, P2, 100.000000
497, P2, 100.000000
498, P2, 100.000000
498, P2, 100.000000
499, P2, 100.000000
499, P2, 100.000000
500, P2, 100.000000
500, P2, 100.000000
501, P2, 100.000000
501, P2, 100.000000
502, P2, 100.000000
502, P2, 100.000000
503, P2, 100.000000
503, P2, 100.000000
504, P2, 100.000000
504, P2, 100.000000
505, P2, 100.000000
505, P2, 100.000000
506, P2, 100.000000
506, P2, 100.000000
507, P2, 100.000000
507, P2, 100.000000
508, P2, 100.000000
508, P2, 100.000000
509, P2, 100.000000
509, P2, 100.000000
510, P2, 100.000000
510, P2, 100.000000
511, P2, 100.000000
511, P2, 100.000000
512, P2, 100.000000
512, P2, 100.000000
*NODE FILE
U
*CONTACT FILE,NSET=NSLAV,FREQUENCY=2
CDISP,CSTRESS
*END STEP
