**
**   Structure: disk segment
**   Test objective: cyclic symmetry
**                   incompatible sides
**
*HEADING
Model: segment
*Node,NSET=Nall
1, 0, 1, 0
2, 0.030974858, 1, 0
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*Element, type=C3D10, ELSET=Eall
1, 133, 37, 30, 214, 658, 640, 641,
1510, 1001, 1511
2, 252, 211, 359, 251, 1123, 1513, 1512,
1125, 1121, 1514
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*MATERIAL,NAME=EL
*ELASTIC
210000.,.3
*DENSITY
7.8E-9
*SOLID SECTION,ELSET=Eall,MATERIAL=EL
*NSET,NSET=Nleft
1,
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*NSET,NSET=Nright
15,
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*SURFACE,NAME=left,TYPE=NODE
Nleft
*SURFACE,NAME=right,TYPE=NODE
Nright
*TIE,POSITION TOLERANCE=0.001,CYCLIC SYMMETRY,NAME=T1
left,right
*CYCLIC SYMMETRY MODEL,N=12,NGRAPH=2
0.,0.,0.,1.,0.,0.
*STEP
*FREQUENCY
10
*SELECT CYCLIC SYMMETRY MODES,NMIN=1,NMAX=1
*END STEP
