*NODE, NSET=Nall
       1,1.000000000000e+01,-1.496992000000e+01,2.014445400000e+02
       2,7.500000000000e+00,-1.746931250000e+01,2.011961675000e+02
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*ELEMENT, TYPE=C3D8, ELSET=Eall
     1,     1,     2,     3,     4,     5,     6,     7,     8
     2,     4,     3,     9,    10,     8,     7,    11,    12
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*MATERIAL,NAME=C355
*ELASTIC
.75E5,0.3
*DENSITY
2.65E-9
*SOLID SECTION,ELSET=Eall,MATERIAL=C355
** Surfaces based on CYC1
*SURFACE, NAME=SCYC1
17, S3
25, S3
19, S3
27, S3
21, S3
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463, S3
** Surfaces based on CYC2
*SURFACE, NAME=SCYC2
178, S5
186, S5
180, S5
188, S5
182, S5
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624, S5
*TIE,NAME=TIE1,CYCLIC SYMMETRY
SCYC1,SCYC2
*CYCLIC SYMMETRY MODEL,N=72, NGRAPH=1
0.,0.,0., 1.,0.,0.
** Names based on spcy
*NSET,NSET=Nspcy
354,
365,
375,
** Names based on spcx
*NSET,NSET=Nspcx
72,
89,
104,
282,
294,
304,
352,
364,
374,
*DESIGNVARIABLES,TYPE=COORDINATE
Nall
*STEP
*STATIC
*DLOAD
Eall, CENTRIF, 9869604.4,  0., 0., 0.,  1., 0., 0.
*BOUNDARY
Nspcx,1
Nspcy,2
*END STEP
*STEP
*FREQUENCY,STORAGE=YES
10
*SELECT CYCLIC SYMMETRY MODES,NMIN=1,NMAX=1
*END STEP
*STEP
*SENSITIVITY
*OBJECTIVE
EIGENFREQUENCY
*FILTER,EDGE PRESERVATION=YES
*NODE FILE
SEN
*END STEP
