**
**   Structure: cantilever shell.
**   Test objective: composite materials (S6-element)
**
*NODE, NSET=Nall
1,1.000000000000e+03,0.000000000000e+00,0.000000000000e+00
2,9.090909090909e+02,0.000000000000e+00,0.000000000000e+00
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*ELEMENT, TYPE=S6, ELSET=Eall
1,      1,      2,      3,      4,      5,      6
2,      3,      2,      7,      5,      8,      9
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*NSET,NSET=Nmaterial1
1,
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*ELSET,ELSET=Ematerial1
1,
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*BOUNDARY
484, 1, ,
484, 2, ,
1, 2, ,
1, 3, ,
2, 3, ,
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529, 3, ,
*ELSET,ELSET=Epart
71,72,121,122
*NSET,NSET=Npart
123,
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*ORIENTATION,NAME=OR1,SYSTEM=RECTANGULAR
1,0,0,0,1,0
*ORIENTATION,NAME=OR2,SYSTEM=RECTANGULAR
0,1,0,-1,0,0
*ORIENTATION,NAME=OR3,SYSTEM=RECTANGULAR
1,1,0,-1,1,0
*ORIENTATION,NAME=OR4,SYSTEM=RECTANGULAR
1,-1,0,1,1,0
*MATERIAL,NAME=MATERIAL1
*ELASTIC,TYPE=ENGINEERING CONSTANTS
181000,10300,1000000,0.28,0,0,7150,5958.3333
5958.3333,295.
*INITIAL CONDITIONS,TYPE=TEMPERATURE
NALL, 295.00
*SHELL SECTION,ELSET=Eall,COMPOSITE
2.5,,MATERIAL1,OR1
2.5,,MATERIAL1,OR2
2.5,,MATERIAL1,OR2
2.5,,MATERIAL1,OR1
*STEP
*STATIC
*DLOAD
1, P, 0.001000
2, P, 0.001000
23, P, 0.001000
3, P, 0.001000
4, P, 0.001000
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242, P, 0.001000
*NODE PRINT,NSET=Npart,GLOBAL=NO
U
*EL PRINT,ELSET=Epart,GLOBAL=NO
S
*END STEP
