**
**   Structure: very thin shell subject to shear.
**   Test objective: simulation of wrinkles;
**                   change the step time to 1. for
**                   full wrinkle development
**
*NODE, NSET=Nall
       1,2.290000000000e+02,0.000000000000e+00,2.37788e-05
       2,2.061000000000e+02,0.000000000000e+00,2.91066e-05
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*ELEMENT, TYPE=S8, ELSET=Eall
     1,      1,      2,      3,      4,      5,      6,      7,      8
     2,      4,      3,      9,     10,      7,     11,     12,     13
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*MATERIAL,NAME=EL
*DENSITY
10.E-9
*ELASTIC
3790.,.38
*SHELL SECTION,ELSET=Eall,MATERIAL=EL
0.0762
*NSET,NSET=Ntop
1,
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*NSET,NSET=Nbottom
310,
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*BOUNDARY
Nbottom,1,3
Ntop,1,1
Ntop,3,3
*AMPLITUDE,NAME=A1
0.,0.,1.,1.
*STEP,NLGEOM,INC=1000
*DYNAMIC
1.e-4,1.e-4
*BOUNDARY,AMPLITUDE=A1
Ntop,2,2,-1.
*NODE PRINT,FREQUENCY=1000,NSET=Nall
U
*END STEP
