**
**   Structure: cantilever beam.
**   Test objective: sensitivity analysis of once-optimized-beam
**
*HEADING
    Model: beam     Date: 10-Mar-1998
*INCLUDE,INPUT=opt3.inc
*ELEMENT, TYPE=C3D20R   , ELSET=Eall
    1,     1,    10,    95,    19,    61,   105,   222,   192,     9,    93,
        94,    20,   104,   220,   221,   193,    62,   103,   219,   190
    2,    10,     2,    13,    95,   105,    34,   134,   222,    11,    12,
        96,    93,   106,   133,   223,   220,   103,    33,   132,   219
    3,    19,    95,    16,     4,   192,   222,   163,    79,    94,    97,
        17,    18,   221,   224,   164,   191,   190,   219,   161,    78
    4,    95,    13,     3,    16,   222,   134,    64,   163,    96,    14,
        15,    97,   223,   135,   162,   224,   219,   132,    63,   161
    5,    61,   105,   222,   192,    59,   109,   228,   196,   104,   220,
        221,   193,   108,   226,   227,   197,    60,   107,   225,   194
    6,   105,    34,   134,   222,   109,    36,   138,   228,   106,   133,
        223,   220,   110,   137,   229,   226,   107,    35,   136,   225
    7,   192,   222,   163,    79,   196,   228,   167,    81,   221,   224,
        164,   191,   227,   230,   168,   195,   194,   225,   165,    80
    8,   222,   134,    64,   163,   228,   138,    66,   167,   223,   135,
        162,   224,   229,   139,   166,   230,   225,   136,    65,   165
    9,    59,   109,   228,   196,    57,   113,   234,   200,   108,   226,
        227,   197,   112,   232,   233,   201,    58,   111,   231,   198
    10,   109,    36,   138,   228,   113,    38,   142,   234,   110,   137,
        229,   226,   114,   141,   235,   232,   111,    37,   140,   231
    11,   196,   228,   167,    81,   200,   234,   171,    83,   227,   230,
        168,   195,   233,   236,   172,   199,   198,   231,   169,    82
    12,   228,   138,    66,   167,   234,   142,    68,   171,   229,   139,
        166,   230,   235,   143,   170,   236,   231,   140,    67,   169
    13,    57,   113,   234,   200,    55,   117,   240,   204,   112,   232,
        233,   201,   116,   238,   239,   205,    56,   115,   237,   202
    14,   113,    38,   142,   234,   117,    40,   146,   240,   114,   141,
        235,   232,   118,   145,   241,   238,   115,    39,   144,   237
    15,   200,   234,   171,    83,   204,   240,   175,    85,   233,   236,
        172,   199,   239,   242,   176,   203,   202,   237,   173,    84
    16,   234,   142,    68,   171,   240,   146,    70,   175,   235,   143,
        170,   236,   241,   147,   174,   242,   237,   144,    69,   173
    17,    55,   117,   240,   204,    53,   121,   246,   208,   116,   238,
        239,   205,   120,   244,   245,   209,    54,   119,   243,   206
    18,   117,    40,   146,   240,   121,    42,   150,   246,   118,   145,
        241,   238,   122,   149,   247,   244,   119,    41,   148,   243
    19,   204,   240,   175,    85,   208,   246,   179,    87,   239,   242,
        176,   203,   245,   248,   180,   207,   206,   243,   177,    86
    20,   240,   146,    70,   175,   246,   150,    72,   179,   241,   147,
        174,   242,   247,   151,   178,   248,   243,   148,    71,   177
    21,    53,   121,   246,   208,    51,   125,   252,   212,   120,   244,
        245,   209,   124,   250,   251,   213,    52,   123,   249,   210
    22,   121,    42,   150,   246,   125,    44,   154,   252,   122,   149,
        247,   244,   126,   153,   253,   250,   123,    43,   152,   249
    23,   208,   246,   179,    87,   212,   252,   183,    89,   245,   248,
        180,   207,   251,   254,   184,   211,   210,   249,   181,    88
    24,   246,   150,    72,   179,   252,   154,    74,   183,   247,   151,
        178,   248,   253,   155,   182,   254,   249,   152,    73,   181
    25,    51,   125,   252,   212,    49,   129,   258,   216,   124,   250,
        251,   213,   128,   256,   257,   217,    50,   127,   255,   214
    26,   125,    44,   154,   252,   129,    46,   158,   258,   126,   153,
        253,   250,   130,   157,   259,   256,   127,    45,   156,   255
    27,   212,   252,   183,    89,   216,   258,   187,    91,   251,   254,
        184,   211,   257,   260,   188,   215,   214,   255,   185,    90
    28,   252,   154,    74,   183,   258,   158,    76,   187,   253,   155,
        182,   254,   259,   159,   186,   260,   255,   156,    75,   185
    29,    49,   129,   258,   216,     5,    22,   100,    31,   128,   256,
        257,   217,    21,    98,    99,    32,    48,   131,   261,   218
    30,   129,    46,   158,   258,    22,     6,    25,   100,   130,   157,
        259,   256,    23,    24,   101,    98,   131,    47,   160,   261
    31,   216,   258,   187,    91,    31,   100,    28,     8,   257,   260,
        188,   215,    99,   102,    29,    30,   218,   261,   189,    92
    32,   258,   158,    76,   187,   100,    25,     7,    28,   259,   159,
            186,   260,   101,    26,    27,   102,   261,   160,    77,   189
*NSET,NSET=DESIGNNODES
    1,
    2,
    5,
    6,
    9,
    10,
    11,
    12,
    20,
    21,
    22,
    23,
    24,
    32,
    33,
    34,
    35,
    36,
    37,
    38,
    39,
    40,
    41,
    42,
    43,
    44,
    45,
    46,
    47,
    48,
    49,
    50,
    51,
    52,
    53,
    54,
    55,
    56,
    57,
    58,
    59,
    60,
    61,
    62,
    63,
    64,
    65,
    66,
    67,
    68,
    69,
    70,
    71,
    72,
    73,
    74,
    75,
    76,
    77,
    78,
    79,
    80,
    81,
    82,
    83,
    84,
    85,
    86,
    87,
    88,
    89,
    90,
    91,
    92,
    93,
    98,
    103,
    104,
    105,
    106,
    107,
    108,
    109,
    110,
    111,
    112,
    113,
    114,
    115,
    116,
    117,
    118,
    119,
    120,
    121,
    122,
    123,
    124,
    125,
    126,
    127,
    128,
    129,
    130,
    131,
    132,
    133,
    134,
    135,
    136,
    137,
    138,
    139,
    140,
    141,
    142,
    143,
    144,
    145,
    146,
    147,
    148,
    149,
    150,
    151,
    152,
    153,
    154,
    155,
    156,
    157,
    158,
    159,
    160,
    161,
    162,
    163,
    164,
    165,
    166,
    167,
    168,
    169,
    170,
    171,
    172,
    173,
    174,
    175,
    176,
    177,
    178,
    179,
    180,
    181,
    182,
    183,
    184,
    185,
    186,
    187,
    188,
    189,
    190,
    191,
    192,
    193,
    194,
    195,
    196,
    197,
    198,
    199,
    200,
    201,
    202,
    203,
    204,
    205,
    206,
    207,
    208,
    209,
    210,
    211,
    212,
    213,
    214,
    215,
    216,
    217,
    218,
    219,
    220,
    221,
    222,
    223,
    224,
    225,
    226,
    227,
    228,
    229,
    230,
    231,
    232,
    233,
    234,
    235,
    236,
    237,
    238,
    239,
    240,
    241,
    242,
    243,
    244,
    245,
    246,
    247,
    248,
    249,
    250,
    251,
    252,
    253,
    254,
    255,
    256,
    257,
    258,
    259,
    260,
    261,
*DESIGN VARIABLES,TYPE=COORDINATE
    DESIGNNODES
*MATERIAL,NAME=EL
*ELASTIC
    210000.0,        .3
*DENSITY
    7.8E-9
*SOLID SECTION,ELSET=Eall,MATERIAL=EL
*STEP
*STATIC
*BOUNDARY
    3,1,3
    4,2,3
    7,1,2
    8,2,2
*CLOAD
    117,2,10.
*NODE FILE
    U
*EL FILE
    S
*END STEP
*STEP
*SENSITIVITY
*OBJECTIVE
    STRESS,DESIGNNODES,10.,100.
*FILTER,TYPE=LINEAR,EDGE PRESERVATION=YES,DIRECTION WEIGHTING=YES
    3.
*CONSTRAINT
    MASS,Eall,LE,1.,
*NODE FILE
    SEN
*END STEP
