*NODE
    1,-0.01275524051292,0.3652622980126,0.16667
    2,0.01519750312785,0.9950686790872,0.16667
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*ELEMENT,TYPE=C3D8
    1,16,24,29,46,18,25,31,47
    2,13,22,28,43,16,24,29,46
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*ELSET,ELSET=Default
    1
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*SURFACE,NAME=HI
    5,S5
    6,S5
    52,S5
    51,S5
    53,S5
    43,S5
    42,S5
    44,S5
*SURFACE,NAME=LO
    7,S3
    8,S3
    49,S3
    48,S3
    50,S3
    55,S3
    54,S3
    56,S3
*MATERIAL,NAME=Material
    *DENSITY
        7800
    *ELASTIC,TYPE=ISOTROPIC
        200000000000,0.29
*SOLID SECTION,ELSET=Default,MATERIAL=Material
*TIE,NAME=Cyclic_1,POSITION TOLERANCE=0,CYCLIC SYMMETRY
    LO,HI
*CYCLIC SYMMETRY MODEL,N=8,NGRAPH=8,TIE=Cyclic_1
    0,0,0,0,0,1
*STEP
    *FREQUENCY
        5
        *SELECT CYCLIC SYMMETRY MODES,NMIN=0,NMAX=0
    *NODE FILE,GLOBAL=YES
        U
    *END STEP
*STEP
    *FREQUENCY
        5
        *SELECT CYCLIC SYMMETRY MODES,NMIN=1,NMAX=1
    *NODE FILE,GLOBAL=YES
        U
    *END STEP
*STEP
    *FREQUENCY
        5
        *SELECT CYCLIC SYMMETRY MODES,NMIN=2,NMAX=4
    *NODE FILE,GLOBAL=YES
        U
    *END STEP
