**
**   Structure: 2d Poiseuille incompressible fluid flow
**   Test objective: CFD Finite Volume Method
**                   walls at constant temperature 0
**                   mean entrance velocity 1.
**                   pressure at exit 1.
**                   Boundary conditions on surfaces
**   Analytical solution: vmax=1.5
**                        Tmax=0.75
**                        pmax=73.
**
*NODE, NSET=Nall
    1,0.000000000000e+00,0.000000000000e+00,1.000000000000e-01
    2,0.000000000000e+00,1.000000000000e-01,1.000000000000e-01
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*ELEMENT, TYPE=F3D8, ELSET=Eall
    1,     1,     2,     3,     4,     5,     6,     7,     8
    2,     4,     3,     9,    10,     8,     7,    11,    12
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*SURFACE, NAME=SOLIDSURFACE
    1, S6
    2, S6
    3, S6
    4, S6
    5, S6
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    200, S4
** Surfaces based on in
*SURFACE, NAME=Sin
    1, S3
    21, S3
    41, S3
    61, S3
    81, S3
    101, S3
    121, S3
    141, S3
    161, S3
    181, S3
** Surfaces based on out
*SURFACE, NAME=Sout
    20, S5
    40, S5
    60, S5
    80, S5
    100, S5
    120, S5
    140, S5
    160, S5
    180, S5
    200, S5
** Surfaces based on wall
*SURFACE, NAME=Swall
    1, S6
    2, S6
    3, S6
    4, S6
    5, S6
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    200, S4
** Surfaces based on side
*SURFACE, NAME=Sside
    1, S1
    21, S1
    2, S1
    22, S1
    1, S2
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    200, S2
*MATERIAL,NAME=WATER
*DENSITY
    1.
*FLUID CONSTANTS
    1.,1.
*CONDUCTIVITY
    1.
*SOLID SECTION,ELSET=Eall,MATERIAL=WATER
*INITIAL CONDITIONS,TYPE=FLUID VELOCITY
    Nall,1,1.
    Nall,2,0.
    Nall,3,0.
*INITIAL CONDITIONS,TYPE=PRESSURE
    Nall,1.
*INITIAL CONDITIONS,TYPE=TEMPERATURE
    Nall,0.
*STEP,INCF=300
*CFD,STEADY STATE
    1.,1.,,,0.01
*BOUNDARYF
    Sin,S,1,1,1.
    Sin,S,2,3,0.
    Sin,S,11,11,0.
    Swall,S,1,3,0.
    Swall,S,11,11,0.
    Sout,S,8,8,1.
*MASS FLOW
    Sside,M,0.
*NODE PRINT,FREQUENCYF=300,NSET=Nall
    VF,PSF,TSF
*EL PRINT,ELSET=Eall
    SVF,HFLF
*END STEP
