**
**   Structure: cantilever beam
**   Test objective: section forces for large deformations
**
*NODE, NSET=Nall
       1,  0.00000e+00,  0.00000e+00,  0.00000e+00
       2,  1.00000e-01,  0.00000e+00,  0.00000e+00
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*ELEMENT, TYPE=B32, ELSET=Eall
     1,      1,      3,      2
     2,      2,      5,      4
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*BOUNDARY
1,1,6
*MATERIAL,NAME=EL
*ELASTIC
210000.,.3
*BEAM SECTION,ELSET=Eall,MATERIAL=EL,SECTION=CIRC
0.01
0.d0,1.d0,0.d0
*STEP,NLGEOM
*STATIC
*CLOAD
40,1,10.
*NODE PRINT,NSET=NALL
U
*EL PRINT,ELSET=EALL
S
*END STEP
