**
**   Structure: spring.
**   Test objective: SPRING2-element.
**
*NODE,NSET=NALL
1,0.,0.,0.
2,1.,0.,0.
*ELEMENT,TYPE=SPRING2,ELSET=EALL
1,1,2
*BOUNDARY
1,1,3
2,3,3
*SPRING,ELSET=EALL
1,1
10.
*STEP,NLGEOM
*STATIC
*BOUNDARY
2,1,1,2.
2,2,2,3.
*NODE PRINT,NSET=NALL
RF
*END STEP
