**
**   Structure: swing.
**   Test objective: B32 elements, different orientations
**                   of the 1-coordinate-axis.
**
*NODE, NSET=Nall
       1, -7.45058e-09, -1.49012e-08,  0.00000e+00
       2,  1.25000e-01,  5.00000e-01,  0.00000e+00
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*ELEMENT, TYPE=B32, ELSET=Eall
     1,      1,      3,      2
     2,      2,      5,      4
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*BOUNDARY
1,1,6
16,1,6
18,1,6
33,1,6
*MATERIAL,NAME=EL
*ELASTIC
210000.,.3
*ELSET,ELSET=Eleg
1,
2,
3,
4,
5,
6,
7,
8,
9,
10,
11,
12,
13,
14,
15,
16,
*ELSET,ELSET=Ehori
17,
18,
19,
20,
*BEAM SECTION,ELSET=Eleg,MATERIAL=EL,SECTION=RECT
0.05
0.,0.,1.
*BEAM SECTION,ELSET=Ehori,MATERIAL=EL,SECTION=RECT
0.05
0.,1.,0.
**
*STEP,NLGEOM
*STATIC
*CLOAD
37,2,-0.001
*NODE PRINT,NSET=Nall
U
*EL PRINT,ELSET=Eall
S
*END STEP
