*MATERIAL, Name=steel
    *DENSITY
        7850
    *ELASTIC
        210000000000, 0.3
*BEAM SECTION,ELSET=Eall,MATERIAL=steel,SECTION=RECT
    0.01,
    1.d0, 1.d0, 0.d0
*NODE, NSET=Nall
       1,0.000000000000e+000,0.000000000000e+000,0.000000000000e+000
       2,4.761904761905e-003,0.000000000000e+000,0.000000000000e+000
       3,9.523809523810e-003,0.000000000000e+000,0.000000000000e+000
       4,1.428571428571e-002,0.000000000000e+000,0.000000000000e+000
       5,1.904761904762e-002,0.000000000000e+000,0.000000000000e+000
       6,2.380952380952e-002,0.000000000000e+000,0.000000000000e+000
       7,2.857142857143e-002,0.000000000000e+000,0.000000000000e+000
       8,3.333333333333e-002,0.000000000000e+000,0.000000000000e+000
       9,3.809523809524e-002,0.000000000000e+000,0.000000000000e+000
      10,4.285714285714e-002,0.000000000000e+000,0.000000000000e+000
      11,4.761904761905e-002,0.000000000000e+000,0.000000000000e+000
      12,5.238095238095e-002,0.000000000000e+000,0.000000000000e+000
      13,5.714285714286e-002,0.000000000000e+000,0.000000000000e+000
      14,6.190476190476e-002,0.000000000000e+000,0.000000000000e+000
      15,6.666666666667e-002,0.000000000000e+000,0.000000000000e+000
      16,7.142857142857e-002,0.000000000000e+000,0.000000000000e+000
      17,7.619047619048e-002,0.000000000000e+000,0.000000000000e+000
      18,8.095238095238e-002,0.000000000000e+000,0.000000000000e+000
      19,8.571428571429e-002,0.000000000000e+000,0.000000000000e+000
      20,9.047619047619e-002,0.000000000000e+000,0.000000000000e+000
      21,9.523809523810e-002,0.000000000000e+000,0.000000000000e+000
      22,1.000000000000e-001,0.000000000000e+000,0.000000000000e+000
*ELEMENT, TYPE=B31, ELSET=Eall
     1,      1,      2
     2,      2,      3
     3,      3,      4
     4,      4,      5
     5,      5,      6
     6,      6,      7
     7,      7,      8
     8,      8,      9
     9,      9,     10
    10,     10,     11
    11,     11,     12
    12,     12,     13
    13,     13,     14
    14,     14,     15
    15,     15,     16
    16,     16,     17
    17,     17,     18
    18,     18,     19
    19,     19,     20
    20,     20,     21
    21,     21,     22
** Names based on fix1
*NSET,NSET=Nfix1
1,
*STEP
    *FREQUENCY
        16
    *STATIC
    *EL FILE
        S, E
    *NODE FILE
        U
    *BOUNDARY
        Nfix1,1,6,0
    *END STEP
