** 16 vlastn�ch frekvenc� (Hz/2*pi*16,05)
*NODE, NSET=Nall
       1,1.000000000000e-002,1.000000000000e-002,0.000000000000e+000
       2,1.000000000000e-002,5.000000000000e-003,0.000000000000e+000
       3,1.000000000000e-002,5.000000000000e-003,1.000000000000e-002
       4,1.000000000000e-002,1.000000000000e-002,1.000000000000e-002
       5,5.000000000000e-003,1.000000000000e-002,0.000000000000e+000
       6,5.000000000000e-003,5.000000000000e-003,0.000000000000e+000
       7,5.000000000000e-003,5.000000000000e-003,1.000000000000e-002
       8,5.000000000000e-003,1.000000000000e-002,1.000000000000e-002
       9,1.000000000000e-002,7.500000000000e-003,0.000000000000e+000
      10,1.000000000000e-002,5.000000000000e-003,5.000000000000e-003
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*ELEMENT, TYPE=C3D20, ELSET=Eall
     1,     1,     2,     3,     4,     5,     6,     7,     8,     9,    10,
          11,    12,    17,    18,    19,    20,    13,    14,    15,    16
     2,     4,     3,    21,    22,     8,     7,    23,    24,    11,    25,
          26,    27,    19,    30,    31,    32,    16,    15,    28,    29
     3,    22,    21,    33,    34,    24,    23,    35,    36,    26,    37,
          38,    39,    31,    42,    43,    44,    29,    28,    40,    41
     4,    34,    33,    45,    46,    36,    35,    47,    48,    38,    49,
          50,    51,    43,    54,    55,    56,    41,    40,    52,    53
     5,    46,    45,    57,    58,    48,    47,    59,    60,    50,    61,
          62,    63,    55,    66,    67,    68,    53,    52,    64,    65
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** Names based on fix1
*NSET,NSET=Nfix1
1,
2,
5,
6,
9,
13,
14,
17,
129,
130,
133,
134,
137,
204,
206,
208,
211,
213,
279,
281,
283,
** Names based on fix2
*NSET,NSET=Nfix2
1,
5,
13,
129,
133,
** Names based on fix3
*NSET,NSET=Nfix3
1,
*MATERIAL, Name=steel
*ELASTIC
  210000000000, 0.3
*DENSITY
7850
*SOLID SECTION, Elset=Eall, Material=steel
*STEP
*STATIC
*BOUNDARY
  Nfix1,1,3,0
**  Nfix2,2,3,0
**  Nfix3,1,3,0
*FREQUENCY
16
*NODE FILE
  U
*EL FILE
  S, E
*END STEP
