*NODE
    1,-0.01275524051292,0.3652622980126,0.16667
    2,0.01519750312785,0.9950686790872,0.16667
    3,0.09567085809127,0.2309698831278,0
    4,-0.1036733106641,0.2274903177191,0.16667
    5,-0.01744974835125,0.4996954135095,0.16667
    6,0.1435062871369,0.3464548246917,0
    7,-0.008725139854685,0.2498553148076,0.16667
    8,-0.1555099659961,0.3412354765787,0.16667
    9,0.1913417161825,0.4619397662556,0
    10,0.08755184531487,0.2341680473121,0.16667
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*ELEMENT,TYPE=C3D8
    1,16,24,29,46,18,25,31,47
    2,13,22,28,43,16,24,29,46
    3,18,25,31,47,19,26,32,48
    4,9,17,5,20,13,22,28,43
    5,14,17,45,15,1,5,30,8
    6,11,14,15,12,7,1,8,4
    7,3,6,14,11,10,36,1,7
    8,6,9,17,14,36,20,5,1
    9,17,45,30,5,22,38,35,28
    10,26,41,40,32,27,44,42,34
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*ELSET,ELSET=Default
    1
    2
    3
    4
    5
    6
    7
    8
    9
    10
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*SURFACE,NAME=HI
    5,S5
    6,S5
    52,S5
    51,S5
    53,S5
    43,S5
    42,S5
    44,S5
*SURFACE,NAME=LO
    7,S3
    8,S3
    49,S3
    48,S3
    50,S3
    55,S3
    54,S3
    56,S3
*MATERIAL,NAME=Material
    *DENSITY
        7800
    *ELASTIC,TYPE=ISOTROPIC
        200000000000,0.29
*SOLID SECTION,ELSET=Default,MATERIAL=Material
*TIE,NAME=Cyclic_1,POSITION TOLERANCE=0,CYCLIC SYMMETRY
    LO,HI
*CYCLIC SYMMETRY MODEL,N=8,NGRAPH=8,TIE=Cyclic_1
    0,0,0,0,0,1
*STEP
    *FREQUENCY
        10
        *SELECT CYCLIC SYMMETRY MODES,NMIN=0,NMAX=0
    *NODE FILE,GLOBAL=YES
        U
    *END STEP
*STEP
    *FREQUENCY
        10
        *SELECT CYCLIC SYMMETRY MODES,NMIN=1,NMAX=1
    *NODE FILE,GLOBAL=YES
        U
    *END STEP
*STEP
    *FREQUENCY
        10
        *SELECT CYCLIC SYMMETRY MODES,NMIN=2,NMAX=4
    *NODE FILE,GLOBAL=YES
        U
    *END STEP
