*BOUNDARY, OP=NEW
*BOUNDARY, OP=NEW
*BOUNDARY, OP=NEW
*STEP, AMPLITUDE=RAMP
    *BOUNDARY, OP=NEW
    *BOUNDARY, OP=NEW
    *BOUNDARY, OP=NEW
*STEP, AMPLITUDE=RAMP
    *BOUNDARY, OP=NEW
    *BOUNDARY, OP=NEW
    *BOUNDARY, OP=NEW
*STEP, AMPLITUDE=RAMP
    *BOUNDARY, OP=NEW
    *BOUNDARY, OP=NEW
    *BOUNDARY, OP=NEW
*STEP, AMPLITUDE=RAMP
    *BOUNDARY, OP=NEW
    *BOUNDARY, OP=NEW
    *BOUNDARY, OP=NEW
